<?xml version="1.0"?>


<!--

 Note:
======
All tables that do not have author listed, the numbers was typed in by Nikolai V. Chr.


 Todo:
======
Make all coefficients functions
Rename all coefficients that should be delta
-->

<aerodynamics>

    <aero_ref_pt_shift_x>
        <function name="metrics/aero-rp-shift-mac">
            <description>
                Mach-tuck: Transonic Shift of Aerodynamic Center
            </description>
            <table>
                <independentVar>velocities/mach</independentVar>
                <tableData>
                  0.6 0
                  1.3 0.5
                </tableData>
            </table>
        </function>
    </aero_ref_pt_shift_x>

    <axis name="X">

        <function name="aero/coefficient/Cx">
            <description>
               Cx coefficient in body coordinate system.
            </description>
            <product>
                <property>aero/qbar-psf</property>
                <property>metrics/Sw-sqft</property>
                <table>
                    <independentVar lookup="row">aero/alpha-deg</independentVar>
                    <independentVar lookup="column">aero/beta-deg</independentVar>
                    <independentVar lookup="table">fcs/elevator-pos-deg</independentVar>
                    <tableData breakPoint="-25.0">
       -30    -25    -20    -15    -10     -8     -6     -4     -2      0      2      4      6      8     10     15     20     25     30
-20 -.1837 -.1953 -.1904 -.1899 -.1949 -.1914 -.1872 -.1860 -.1860 -.1868 -.1899 -.1902 -.1900 -.1896 -.1883 -.1833 -.1838 -.1787 -.1771
-15 -.1714 -.1765 -.1792 -.1827 -.1816 -.1834 -.1852 -.1853 -.1877 -.1875 -.1898 -.1876 -.1868 -.1846 -.1841 -.1852 -.1817 -.1790 -.1739
-10 -.1531 -.1627 -.1692 -.1718 -.1695 -.1693 -.1707 -.1735 -.1772 -.1787 -.1769 -.1729 -.1711 -.1706 -.1698 -.1721 -.1695 -.1630 -.1534
-05 -.1151 -.1232 -.1276 -.1317 -.1390 -.1415 -.1420 -.1425 -.1437 -.1432 -.1425 -.1422 -.1410 -.1397 -.1372 -.1299 -.1258 -.1214 -.1133
 00 -.0907 -.0985 -.1043 -.1093 -.1120 -.1115 -.1122 -.1124 -.1130 -.1132 -.1129 -.1119 -.1110 -.1102 -.1092 -.1065 -.1015 -.0957 -.0879
 05 -.0514 -.0567 -.0603 -.0640 -.0653 -.0661 -.0668 -.0675 -.0690 -.0693 -.0686 -.0680 -.0664 -.0650 -.0649 -.0631 -.0594 -.0558 -.0505
 10 -.0079 -.0108 -.0099 -.0101 -.0074 -.0070 -.0078 -.0090 -.0116 -.0120 -.0123 -.0106 -.0088 -.0083 -.0080 -.0107 -.0105 -.0114 -.0085
 15 0.0354 0.0358 0.0388 0.0402 0.0477 0.0503 0.0535 0.0553 0.0538 0.0537 0.0533 0.0536 0.0527 0.0509 0.0485 0.0410 0.0396 0.0366 0.0362
 20 0.0740 0.0756 0.0746 0.0745 0.0867 0.0888 0.0924 0.0941 0.0948 0.0951 0.0975 0.0939 0.0913 0.0867 0.0824 0.0702 0.0703 0.0713 0.0697
 25 0.1092 0.1124 0.1102 0.1067 0.1101 0.1121 0.1126 0.1129 0.1123 0.1111 0.1122 0.1125 0.1136 0.1115 0.1075 0.1041 0.1076 0.1098 0.1066
 30 0.0915 0.1010 0.0975 0.1079 0.1188 0.1333 0.1399 0.1422 0.1443 0.1435 0.1431 0.1407 0.1379 0.1359 0.1323 0.1214 0.1110 0.1145 0.1050
 35 0.1079 0.1137 0.1198 0.1278 0.1402 0.1425 0.1478 0.1570 0.1623 0.1663 0.1667 0.1664 0.1637 0.1560 0.1460 0.1336 0.1256 0.1195 0.1137
 40 0.1306 0.1437 0.1350 0.1441 0.1574 0.1585 0.1601 0.1682 0.1726 0.1739 0.1711 0.1699 0.1655 0.1611 0.1567 0.1434 0.1343 0.1430 0.1299
 45 0.1535 0.1603 0.1605 0.1604 0.1637 0.1671 0.1664 0.1639 0.1674 0.1659 0.1649 0.1650 0.1625 0.1597 0.1573 0.1540 0.1541 0.1539 0.1471
 50 0.1471 0.1584 0.1646 0.1671 0.1712 0.1712 0.1676 0.1644 0.1656 0.1693 0.1714 0.1728 0.1749 0.1725 0.1730 0.1537 0.1457 0.1435 0.1362
 55 0.1554 0.1615 0.1568 0.1661 0.1778 0.1769 0.1765 0.1749 0.1762 0.1804 0.1743 0.1666 0.1677 0.1724 0.1761 0.1722 0.1347 0.1448 0.1442
 60 0.1501 0.1599 0.1647 0.1525 0.1664 0.1662 0.1794 0.1710 0.1719 0.1718 0.1728 0.1730 0.1734 0.1721 0.1688 0.1471 0.1462 0.1486 0.1460
 70 0.1501 0.1536 0.1569 0.1420 0.1573 0.1595 0.1788 0.1715 0.1738 0.1695 0.1710 0.1712 0.1730 0.1720 0.1686 0.1474 0.1567 0.1557 0.1545
 80 0.1685 0.1615 0.1559 0.1520 0.1521 0.1521 0.1535 0.1585 0.1566 0.1598 0.1573 0.1563 0.1586 0.1558 0.1572 0.1410 0.1410 0.1467 0.1538
 90 0.1712 0.1651 0.1608 0.1648 0.1676 0.1660 0.1686 0.1667 0.1669 0.1660 0.1672 0.1662 0.1664 0.1711 0.1677 0.1531 0.1493 0.1549 0.1624
                    </tableData>
                    <tableData breakPoint="-10.0">
       -30    -25    -20    -15    -10     -8     -6     -4     -2      0      2      4      6      8     10     15     20     25     30
-20 -.1362 -.1351 -.1419 -.1386 -.1374 -.1330 -.1268 -.1249 -.1222 -.1223 -.1246 -.1247 -.1252 -.1257 -.1282 -.1294 -.1327 -.1259 -.1270
-15 -.1216 -.1245 -.1235 -.1208 -.1176 -.1176 -.1170 -.1177 -.1184 -.1188 -.1185 -.1187 -.1182 -.1178 -.1184 -.1216 -.1243 -.1253 -.1224
-10 -.1018 -.1066 -.1068 -.1071 -.1061 -.1068 -.1072 -.1083 -.1094 -.1147 -.1095 -.1084 -.1077 -.1063 -.1069 -.1079 -.1076 -.1074 -.1026
-05 -.0655 -.0706 -.0746 -.0771 -.0836 -.0864 -.0876 -.0887 -.0889 -.0893 -.0885 -.0875 -.0859 -.0842 -.0812 -.0747 -.0722 -.0682 -.0631
 00 -.0483 -.0509 -.0532 -.0544 -.0578 -.0589 -.0597 -.0606 -.0613 -.0617 -.0611 -.0603 -.0595 -.0577 -.0561 -.0527 -.0515 -.0492 -.0466
 05 -.0118 -.0106 -.0096 -.0102 -.0142 -.0148 -.0155 -.0161 -.0177 -.0172 -.0178 -.0167 -.0156 -.0141 -.0133 -.0093 -.0087 -.0106 -.0127
 10 0.0268 0.0328 0.0367 0.0399 0.0412 0.0417 0.0408 0.0413 0.0406 0.0399 0.0399 0.0409 0.0415 0.0414 0.0412 0.0399 0.0367 0.0328 0.0268
 15 0.0735 0.0800 0.0887 0.0934 0.0983 0.1006 0.1024 0.1034 0.1033 0.1027 0.1031 0.1027 0.1018 0.1008 0.0983 0.0934 0.0887 0.0800 0.0735
 20 0.1222 0.1275 0.1258 0.1249 0.1326 0.1347 0.1350 0.1349 0.1325 0.1322 0.1332 0.1338 0.1343 0.1310 0.1298 0.1221 0.1230 0.1247 0.1194
 25 0.1374 0.1474 0.1466 0.1454 0.1465 0.1485 0.1485 0.1453 0.1429 0.1407 0.1418 0.1443 0.1457 0.1442 0.1439 0.1428 0.1440 0.1448 0.1348
 30 0.1056 0.1261 0.1297 0.1437 0.1500 0.1619 0.1655 0.1660 0.1663 0.1651 0.1640 0.1643 0.1624 0.1615 0.1593 0.1530 0.1390 0.1354 0.1149
 35 0.1075 0.1154 0.1299 0.1377 0.1523 0.1591 0.1722 0.1789 0.1801 0.1795 0.1793 0.1804 0.1782 0.1749 0.1675 0.1529 0.1451 0.1306 0.1227
 40 0.1335 0.1412 0.1365 0.1456 0.1597 0.1622 0.1725 0.1762 0.1798 0.1798 0.1810 0.1771 0.1710 0.1702 0.1659 0.1518 0.1427 0.1474 0.1397
 45 0.1521 0.1486 0.1517 0.1520 0.1608 0.1613 0.1597 0.1671 0.1667 0.1671 0.1664 0.1653 0.1629 0.1597 0.1569 0.1481 0.1478 0.1447 0.1482
 50 0.1346 0.1410 0.1422 0.1486 0.1561 0.1570 0.1538 0.1511 0.1515 0.1544 0.1549 0.1547 0.1560 0.1538 0.1544 0.1469 0.1405 0.1393 0.1329
 55 0.1375 0.1367 0.1251 0.1336 0.1467 0.1472 0.1475 0.1465 0.1462 0.1488 0.1433 0.1361 0.1370 0.1405 0.1431 0.1300 0.1215 0.1331 0.1339
 60 0.1316 0.1360 0.1355 0.1154 0.1285 0.1289 0.1336 0.1351 0.1372 0.1383 0.1356 0.1320 0.1387 0.1323 0.1310 0.1179 0.1380 0.1385 0.1341
 70 0.1171 0.1174 0.1185 0.1108 0.1161 0.1187 0.1376 0.1312 0.1353 0.1328 0.1301 0.1263 0.1270 0.1281 0.1268 0.1215 0.1292 0.1281 0.1278
 80 0.1201 0.1161 0.1136 0.1124 0.1158 0.1148 0.1149 0.1194 0.1177 0.1211 0.1195 0.1195 0.1225 0.1204 0.1177 0.1143 0.1155 0.1180 0.1220
 90 0.1287 0.1241 0.1214 0.1221 0.1265 0.1256 0.1257 0.1236 0.1248 0.1247 0.1262 0.1256 0.1256 0.1297 0.1257 0.1213 0.1206 0.1233 0.1279
                     </tableData>
                    <tableData breakPoint="0.0">
       -30    -25    -20    -15    -10     -8     -6     -4     -2      0      2      4      6      8     10     15     20     25     30
-20 -.1072 -.1061 -.1129 -.1096 -.1084 -.1040 -.0978 -.0959 -.0932 -.0933 -.0956 -.0957 -.0962 -.0967 -.0992 -.1004 -.1037 -.0969 -.0980
-15 -.1006 -.1035 -.1025 -.0998 -.0966 -.0966 -.0960 -.0967 -.0974 -.0978 -.0975 -.0977 -.0972 -.0968 -.0974 -.1006 -.1033 -.1043 -.1014
-10 -.0853 -.0901 -.0903 -.0906 -.0896 -.0903 -.0907 -.0918 -.0929 -.0982 -.0930 -.0919 -.0912 -.0898 -.0904 -.0914 -.0911 -.0909 -.0861
-05 -.0546 -.0597 -.0637 -.0662 -.0727 -.0755 -.0767 -.0778 -.0780 -.0784 -.0776 -.0766 -.0750 -.0733 -.0703 -.0638 -.0613 -.0573 -.0522
 00 -.0355 -.0381 -.0404 -.0416 -.0450 -.0461 -.0469 -.0478 -.0485 -.0489 -.0483 -.0475 -.0467 -.0449 -.0433 -.0399 -.0387 -.0364 -.0338
 05 -.0012 0.0000 0.0010 0.0004 -.0036 -.0042 -.0049 -.0055 -.0071 -.0066 -.0072 -.0061 -.0050 -.0035 -.0027 0.0013 0.0019 0.0000 -.0021
 10 0.0359 0.0491 0.0458 0.0490 0.0503 0.0508 0.0499 0.0509 0.0497 0.0490 0.0490 0.0500 0.0506 0.0505 0.0503 0.0490 0.0458 0.0419 0.0359
 15 0.0780 0.0845 0.0932 0.0979 0.1028 0.1051 0.1069 0.1079 0.1078 0.1072 0.1076 0.1072 0.1063 0.1053 0.1028 0.0979 0.0932 0.0845 0.0780
 20 0.1183 0.1236 0.1219 0.1210 0.1287 0.1308 0.1311 0.1310 0.1286 0.1283 0.1293 0.1299 0.1304 0.1271 0.1259 0.1182 0.1191 0.1208 0.1155
 25 0.1267 0.1367 0.1359 0.1347 0.1358 0.1378 0.1378 0.1346 0.1322 0.1300 0.1311 0.1336 0.1350 0.1335 0.1332 0.1321 0.1333 0.1341 0.1241
 30 0.0941 0.1146 0.1182 0.1322 0.1385 0.1504 0.1540 0.1545 0.1548 0.1536 0.1525 0.1528 0.1509 0.1500 0.1478 0.1415 0.1275 0.1239 0.1034
 35 0.0885 0.0964 0.1109 0.1189 0.1333 0.1391 0.1532 0.1599 0.1611 0.1605 0.1603 0.1614 0.1592 0.1559 0.1485 0.1339 0.1261 0.1116 0.1037
 40 0.1089 0.1166 0.1119 0.1210 0.1351 0.1376 0.1479 0.1516 0.1552 0.1552 0.1564 0.1525 0.1464 0.1456 0.1413 0.1272 0.1181 0.1228 0.1151
 45 0.1232 0.1197 0.1228 0.1231 0.1319 0.1324 0.1308 0.1332 0.1378 0.1382 0.1375 0.1364 0.1340 0.1380 0.1280 0.1192 0.1189 0.1158 0.1193
 50 0.1135 0.1185 0.1184 0.1171 0.1243 0.1279 0.1279 0.1258 0.1257 0.1281 0.1258 0.1228 0.1221 0.1186 0.1180 0.1108 0.1121 0.1122 0.1072
 55 0.1137 0.1195 0.1146 0.1161 0.1209 0.1211 0.1211 0.1195 0.1183 0.1200 0.1185 0.1153 0.1160 0.1152 0.1135 0.1087 0.1072 0.1121 0.1063
 60 0.1037 0.1090 0.1094 0.1049 0.1109 0.1123 0.1181 0.1184 0.1170 0.1147 0.1141 0.1126 0.1129 0.1129 0.1109 0.1049 0.1094 0.1090 0.1037
 70 0.0857 0.0858 0.0857 0.0796 0.0851 0.0919 0.1150 0.1087 0.1089 0.1025 0.1022 0.1007 0.1012 0.0994 0.0952 0.0897 0.0958 0.0959 0.0958
 80 0.0842 0.0807 0.0787 0.0778 0.0791 0.0793 0.0805 0.0846 0.0808 0.0821 0.0802 0.0799 0.0826 0.0800 0.0709 0.0756 0.0765 0.0785 0.0820
 90 0.0847 0.0813 0.0798 0.0824 0.0843 0.0843 0.0853 0.0841 0.0858 0.0864 0.0857 0.0828 0.0817 0.0857 0.0816 0.0797 0.0771 0.0786 0.0820
                    </tableData>
                    <tableData breakPoint="10.0">
       -30    -25    -20    -15    -10     -8     -6     -4     -2      0      2      4      6      8     10     15     20     25     30
-20 -.1023 -.1012 -.1080 -.1047 -.1035 -.0991 -.0929 -.0910 -.0884 -.0884 -.0907 -.0908 -.0913 -.0918 -.0943 -.0955 -.0988 -.0920 -.0931
-15 -.1038 -.1067 -.1057 -.1030 -.0998 -.0988 -.0992 -.0999 -.1006 -.1010 -.1007 -.1009 -.1004 -.1000 -.1006 -.1038 -.1065 -.1075 -.1046
-10 -.0963 -.1011 -.1013 -.1016 -.1006 -.1013 -.1017 -.1028 -.1039 -.1092 -.1040 -.1029 -.1022 -.1008 -.1014 -.1024 -.1021 -.1019 -.0971
-05 -.0664 -.0715 -.0755 -.0780 -.0845 -.0873 -.0885 -.0896 -.0898 -.0902 -.0894 -.0884 -.0868 -.0851 -.0821 -.0756 -.0731 -.0691 -.0640
 00 -.0472 -.0498 -.0521 -.0533 -.0567 -.0578 -.0586 -.0595 -.0602 -.0606 -.0600 -.0592 -.0584 -.0566 -.0550 -.0516 -.0504 -.0481 -.0455
 05 -.0146 -.0134 -.0124 -.0130 -.0170 -.0176 -.0183 -.0189 -.0205 -.0200 -.0206 -.0195 -.0184 -.0169 -.0161 -.0121 -.0115 -.0134 -.0155
 10 0.0182 0.0242 0.0281 0.0313 0.0326 0.0331 0.0322 0.0327 0.0320 0.0313 0.0313 0.0323 0.0329 0.0328 0.0326 0.0313 0.0281 0.0242 0.0182
 15 0.0537 0.0602 0.0689 0.0736 0.0785 0.0808 0.0826 0.0836 0.0835 0.0829 0.0833 0.0829 0.0820 0.0810 0.0785 0.0736 0.0689 0.0602 0.0537
 20 0.0871 0.0924 0.0907 0.0898 0.0975 0.0996 0.0999 0.0998 0.0974 0.0971 0.0981 0.0987 0.0992 0.0959 0.0947 0.0870 0.0879 0.0896 0.0843
 25 0.0916 0.1016 0.1008 0.0996 0.1007 0.1027 0.1027 0.0995 0.0971 0.0949 0.0960 0.0985 0.0999 0.0984 0.0981 0.0970 0.0982 0.0990 0.0890
 30 0.0509 0.0714 0.0750 0.0890 0.0953 0.1072 0.1108 0.1113 0.1116 0.1104 0.1093 0.1096 0.1077 0.1068 0.1046 0.0983 0.0843 0.0807 0.0602
 35 0.0481 0.0560 0.0705 0.0783 0.0929 0.0987 0.1128 0.1195 0.1207 0.1201 0.1199 0.1210 0.1188 0.1155 0.1081 0.0935 0.0857 0.0712 0.0633
 40 0.0664 0.0741 0.0694 0.0785 0.0926 0.0951 0.1054 0.1091 0.1127 0.1127 0.1139 0.1100 0.1039 0.1031 0.0988 0.0847 0.0756 0.0803 0.0726
 45 0.0846 0.0811 0.0842 0.0845 0.0933 0.0938 0.0922 0.0946 0.0992 0.0996 0.0989 0.0978 0.0954 0.0922 0.0894 0.0806 0.0803 0.0772 0.0807
 50 0.0908 0.0985 0.1011 0.0999 0.1063 0.1061 0.1018 0.0996 0.1021 0.1071 0.1071 0.1064 0.1070 0.1036 0.1032 0.0968 0.0980 0.0954 0.0877
 55 0.0842 0.0869 0.0790 0.0882 0.1025 0.1010 0.0993 0.0980 0.0991 0.1030 0.0972 0.0897 0.0914 0.0969 0.1015 0.0872 0.0780 0.0859 0.0832
 60 0.0749 0.0823 0.0849 0.0794 0.0831 0.0841 0.0896 0.0908 0.0915 0.0914 0.0908 0.0893 0.0895 0.0889 0.0868 0.0831 0.0886 0.0860 0.0786
 70 0.0504 0.0500 0.0504 0.0467 0.0813 0.0811 0.0972 0.0950 0.1075 0.1190 0.1101 0.1001 0.0967 0.0958 0.0931 0.0585 0.0622 0.0618 0.0622
 80 0.0421 0.0380 0.0355 0.0397 0.0420 0.0417 0.0424 0.0478 0.0473 0.0519 0.0484 0.0465 0.0489 0.0472 0.0450 0.0427 0.0385 0.0410 0.0451
 90 0.0433 0.0404 0.0395 0.0467 0.0495 0.0492 0.0499 0.0484 0.0500 0.0504 0.0495 0.0463 0.0457 0.0510 0.0482 0.0454 0.0382 0.0391 0.0420
                    </tableData>
                    <tableData breakPoint="25.0">
       -30    -25    -20    -15    -10     -8     -6     -4     -2      0      2      4      6      8     10     15     20     25     30
-20 -.1068 -.1102 -.1160 -.1176 -.1291 -.1289 -.1244 -.1158 -.1137 -.1141 -.1164 -.1192 -.1200 -.1240 -.1243 -.1128 -.1112 -.1054 -.1020
-15 -.1122 -.1180 -.1227 -.1292 -.1365 -.1397 -.1406 -.1416 -.1442 -.1450 -.1448 -.1428 -.1408 -.1440 -.1397 -.1324 -.1259 -.1212 -.1154
-10 -.1102 -.1212 -.1319 -.1359 -.1403 -.1427 -.1454 -.1480 -.1520 -.1633 -.1518 -.1482 -.1457 -.1438 -.1419 -.1375 -.1335 -.1228 -.1118
-05 -.0911 -.1027 -.1093 -.1144 -.1244 -.1304 -.1316 -.1320 -.1333 -.1337 -.1340 -.1322 -.1309 -.1280 -.1243 -.1143 -.1092 -.1026 -.0910
 00 -.0811 -.0889 -.0955 -.0996 -.1015 -.1037 -.1056 -.1065 -.1077 -.1075 -.1072 -.1061 -.1045 -.1024 -.1003 -.0984 -.0943 -.0877 -.0799
 05 -.0575 -.0588 -.0631 -.0676 -.0671 -.0694 -.0715 -.0739 -.0775 -.0785 -.0787 -.0744 -.0704 -.0688 -.0669 -.0674 -.0624 -.0586 -.0573
 10 -.0183 -.0188 -.0211 -.0241 -.0226 -.0254 -.0291 -.0333 -.0370 -.0336 -.0345 -.0326 -.0283 -.0247 -.0236 -.0251 -.0221 -.0198 -.0193
 15 0.0195 0.0186 0.0204 0.0186 0.0194 0.0181 0.0154 0.0162 0.0198 0.0212 0.0157 0.0131 0.0136 0.0158 0.0179 0.0171 0.0189 0.0171 0.0180
 20 0.0494 0.0626 0.0562 0.0477 0.0323 0.0279 0.0289 0.0263 0.0204 0.0187 0.0173 0.0255 0.0183 0.0165 0.0119 0.0273 0.0358 0.0422 0.0290
 25 0.0699 0.0695 0.0627 0.0557 0.0366 0.0316 0.0263 0.0207 0.0160 0.0198 0.0165 0.0218 0.0244 0.0228 0.0214 0.0405 0.0475 0.0543 0.0547
 30 0.0207 0.0324 0.0323 0.0293 0.0304 0.0404 0.0419 0.0404 0.0385 0.0381 0.0374 0.0379 0.0389 0.0417 0.0446 0.0435 0.0465 0.0466 0.0349
 35 0.0211 0.0282 0.0309 0.0263 0.0307 0.0334 0.0437 0.0466 0.0458 0.0479 0.0495 0.0495 0.0487 0.0467 0.0434 0.0390 0.0435 0.0409 0.0338
 40 0.0386 0.0462 0.0331 0.0339 0.0365 0.0407 0.0394 0.0411 0.0407 0.0418 0.0413 0.0426 0.0392 0.0405 0.0381 0.0355 0.0347 0.0478 0.0402
 45 0.0460 0.0438 0.0341 0.0311 0.0348 0.0373 0.0362 0.0335 0.0338 0.0363 0.0325 0.0340 0.0342 0.0356 0.0338 0.0301 0.0331 0.0428 0.0450
 50 0.0394 0.0479 0.0513 0.0447 0.0538 0.0528 0.0483 0.0441 0.0444 0.0472 0.0488 0.0497 0.0507 0.0487 0.0495 0.0478 0.0525 0.0476 0.0376
 55 0.0336 0.0411 0.0380 0.0471 0.0543 0.0508 0.0471 0.0445 0.0450 0.0484 0.0442 0.0383 0.0410 0.0471 0.0522 0.0432 0.0272 0.0347 0.0315
 60 0.0158 0.0284 0.0361 0.0335 0.0487 0.0443 0.0442 0.0432 0.0451 0.0460 0.0451 0.0433 0.0435 0.0438 0.0416 0.0363 0.0397 0.0340 0.0246
 70 -.0186 -.0121 -.0057 -.0070 0.0410 0.0451 0.0655 0.0604 0.0655 0.0641 0.0677 0.0701 0.0702 0.0636 0.0546 0.0033 0.0020 -.0005 0.0058
 80 -.0242 -.0267 -.0277 -.0200 -.0215 -.0224 -.0223 -.0180 -.0202 -.0173 -.0046 0.0281 0.0311 0.0053 -.0210 -.0288 -.0312 -.0240 -.0152
 90 -.0208 -.0271 -.0315 -.0229 -.0156 -.0165 -.0141 -.0184 -.0173 -.0173 -.0168 -.0185 -.0183 -.0130 -.0157 -.0237 -.0323 -.0246 -.0150
                     </tableData>
                </table>
            </product>
        </function>

        <function name="aero/coefficient/delta-Cx_lef">
            <description>
               Cx due to leading edge flaps coefficient.
            </description>
            <product>
                <property>aero/qbar-psf</property>
                <property>metrics/Sw-sqft</property>
                <property>fcs/lef-pos-r-norm</property>
                <difference>
                  <table name="Cx_lef">
                      <independentVar lookup="row">aero/alpha-deg</independentVar>
                      <independentVar lookup="column">aero/beta-deg</independentVar>
                      <tableData>
       -30    -25    -20    -15    -10     -8     -6     -4     -2      0      2      4      6      8     10     15     20     25     30
-20 -.0277 -.0285 -.0318 -.0256 -.0184 -.0156 -.0159 -.0162 -.0174 -.0181 -.0179 -.0167 -.0168 -.0156 -.0153 -.0225 -.0287 -.0254 -.0246
-15 -.0314 -.0310 -.0259 -.0191 -.0161 -.0157 -.0162 -.0173 -.0189 -.0193 -.0186 -.0186 -.0170 -.0155 -.0154 -.0184 -.0252 -.0303 -.0307
-10 -.0295 -.0298 -.0260 -.0233 -.0209 -.0215 -.0214 -.0224 -.0230 -.0224 -.0220 -.0217 -.0213 -.0205 -.0199 -.0223 -.0250 -.0288 -.0285
-05 -.0148 -.0153 -.0163 -.0150 -.0167 -.0173 -.0185 -.0189 -.0193 -.0196 -.0192 -.0185 -.0179 -.0178 -.0162 -.0155 -.0168 -.0158 -.0153
 00 -.0136 -.0149 -.0143 -.0136 -.0168 -.0178 -.0182 -.0188 -.0197 -.0202 -.0196 -.0188 -.0180 -.0172 -.0160 -.0144 -.0151 -.0149 -.0144
 05 -.0029 -.0010 -.0003 -.0005 -.0004 -.0006 -.0017 -.0027 -.0033 -.0033 -.0033 -.0024 -.0014 -.0004 0.0004 0.0013 0.0011 -.0002 -.0021
 10 0.0085 0.0104 0.0116 0.0121 0.0131 0.0125 0.0122 0.0119 0.0104 0.0099 0.0096 0.0106 0.0117 0.0126 0.0127 0.0117 0.0112 0.0100 0.0081
 15 0.0145 0.0168 0.0196 0.0218 0.0225 0.0231 0.0238 0.0238 0.0231 0.0224 0.0224 0.0226 0.0227 0.0223 0.0222 0.0215 0.0193 0.0165 0.0142
 20 0.0165 0.0170 0.0205 0.0226 0.0252 0.0245 0.0236 0.0232 0.0233 0.0221 0.0232 0.0241 0.0250 0.0267 0.0276 0.0250 0.0229 0.0212 0.0189
 25 0.0138 0.0172 0.0157 0.0178 0.0226 0.0251 0.0264 0.0274 0.0271 0.0278 0.0275 0.0271 0.0267 0.0249 0.0252 0.0203 0.0183 0.0198 0.0164
 30 0.0092 0.0122 0.0129 0.0165 0.0202 0.0253 0.0279 0.0295 0.0296 0.0301 0.0309 0.0306 0.0278 0.0261 0.0247 0.0200 0.0174 0.0167 0.0137
 35 0.0099 0.0134 0.0162 0.0149 0.0208 0.0229 0.0273 0.0286 0.0303 0.0305 0.0286 0.0307 0.0292 0.0259 0.0253 0.0194 0.0207 0.0179 0.0144
 40 0.0206 0.0202 0.0236 0.0246 0.0289 0.0293 0.0290 0.0320 0.0317 0.0328 0.0314 0.0305 0.0289 0.0281 0.0262 0.0219 0.0209 0.0175 0.0179
 45 0.0257 0.0274 0.0266 0.0236 0.0266 0.0283 0.0236 0.0298 0.0268 0.0309 0.0307 0.0280 0.0238 0.0284 0.0254 0.0224 0.0254 0.0262 0.0245
                     </tableData>
                </table>
                <table name="Cx_dh0">
                    <independentVar lookup="row">aero/alpha-deg</independentVar>
                    <independentVar lookup="column">aero/beta-deg</independentVar>
                    <tableData>
       -30    -25    -20    -15    -10     -8     -6     -4     -2      0      2      4      6      8     10     15     20     25     30
-20 -.1072 -.1061 -.1129 -.1096 -.1084 -.1040 -.0978 -.0959 -.0932 -.0933 -.0956 -.0957 -.0962 -.0967 -.0992 -.1004 -.1037 -.0969 -.0980
-15 -.1006 -.1035 -.1025 -.0998 -.0966 -.0966 -.0960 -.0967 -.0974 -.0978 -.0975 -.0977 -.0972 -.0968 -.0974 -.1006 -.1033 -.1043 -.1014
-10 -.0853 -.0901 -.0903 -.0906 -.0896 -.0903 -.0907 -.0918 -.0929 -.0982 -.0930 -.0919 -.0912 -.0898 -.0904 -.0914 -.0911 -.0909 -.0861
-05 -.0546 -.0597 -.0637 -.0662 -.0727 -.0755 -.0767 -.0778 -.0780 -.0784 -.0776 -.0766 -.0750 -.0733 -.0703 -.0638 -.0613 -.0573 -.0522
 00 -.0355 -.0381 -.0404 -.0416 -.0450 -.0461 -.0469 -.0478 -.0485 -.0489 -.0483 -.0475 -.0467 -.0449 -.0433 -.0399 -.0387 -.0364 -.0338
 05 -.0012 0.0000 0.0010 0.0004 -.0036 -.0042 -.0049 -.0055 -.0071 -.0066 -.0072 -.0061 -.0050 -.0035 -.0027 0.0013 0.0019 0.0000 -.0021
 10 0.0359 0.0491 0.0458 0.0490 0.0503 0.0508 0.0499 0.0509 0.0497 0.0490 0.0490 0.0500 0.0506 0.0505 0.0503 0.0490 0.0458 0.0419 0.0359
 15 0.0780 0.0845 0.0932 0.0979 0.1028 0.1051 0.1069 0.1079 0.1078 0.1072 0.1076 0.1072 0.1063 0.1053 0.1028 0.0979 0.0932 0.0845 0.0780
 20 0.1183 0.1236 0.1219 0.1210 0.1287 0.1308 0.1311 0.1310 0.1286 0.1283 0.1293 0.1299 0.1304 0.1271 0.1259 0.1182 0.1191 0.1208 0.1155
 25 0.1267 0.1367 0.1359 0.1347 0.1358 0.1378 0.1378 0.1346 0.1322 0.1300 0.1311 0.1336 0.1350 0.1335 0.1332 0.1321 0.1333 0.1341 0.1241
 30 0.0941 0.1146 0.1182 0.1322 0.1385 0.1504 0.1540 0.1545 0.1548 0.1536 0.1525 0.1528 0.1509 0.1500 0.1478 0.1415 0.1275 0.1239 0.1034
 35 0.0885 0.0964 0.1109 0.1189 0.1333 0.1391 0.1532 0.1599 0.1611 0.1605 0.1603 0.1614 0.1592 0.1559 0.1485 0.1339 0.1261 0.1116 0.1037
 40 0.1089 0.1166 0.1119 0.1210 0.1351 0.1376 0.1479 0.1516 0.1552 0.1552 0.1564 0.1525 0.1464 0.1456 0.1413 0.1272 0.1181 0.1228 0.1151
 45 0.1232 0.1197 0.1228 0.1231 0.1319 0.1324 0.1308 0.1332 0.1378 0.1382 0.1375 0.1364 0.1340 0.1380 0.1280 0.1192 0.1189 0.1158 0.1193
 50 0.1135 0.1185 0.1184 0.1171 0.1243 0.1279 0.1279 0.1258 0.1257 0.1281 0.1258 0.1228 0.1221 0.1186 0.1180 0.1108 0.1121 0.1122 0.1072
 55 0.1137 0.1195 0.1146 0.1161 0.1209 0.1211 0.1211 0.1195 0.1183 0.1200 0.1185 0.1153 0.1160 0.1152 0.1135 0.1087 0.1072 0.1121 0.1063
 60 0.1037 0.1090 0.1094 0.1049 0.1109 0.1123 0.1181 0.1184 0.1170 0.1147 0.1141 0.1126 0.1129 0.1129 0.1109 0.1049 0.1094 0.1090 0.1037
 70 0.0857 0.0858 0.0857 0.0796 0.0851 0.0919 0.1150 0.1087 0.1089 0.1025 0.1022 0.1007 0.1012 0.0994 0.0952 0.0897 0.0958 0.0959 0.0958
 80 0.0842 0.0807 0.0787 0.0778 0.0791 0.0793 0.0805 0.0846 0.0808 0.0821 0.0802 0.0799 0.0826 0.0800 0.0709 0.0756 0.0765 0.0785 0.0820
 90 0.0847 0.0813 0.0798 0.0824 0.0843 0.0843 0.0853 0.0841 0.0858 0.0864 0.0857 0.0828 0.0817 0.0857 0.0816 0.0797 0.0771 0.0786 0.0820
                      </tableData>
                  </table>
              </difference>
            </product>
        </function>

        <function name="aero/coefficient/Cx_sb">
            <description>
               Cx due speed brake coefficient.
            </description>
            <product>
                <property>aero/qbar-psf</property>
                <property>metrics/Sw-sqft</property>
                <property>fcs/speedbrake-pos-norm</property>
                <table>
                    <independentVar lookup="row">aero/alpha-deg</independentVar>
                    <tableData>
-20 -.0101
-15 -.0101
-10 -.0101
-05 -.0101
 00 -.0101
 05 -.0358
 10 -.0790
 15 -.1227
 20 -.1827
 25 -.1892
 30 -.1988
 35 -.2000
 40 -.1874
 45 -.1673
 50 -.1476
 55 -.1310
 60 -.1279
 70 -.1325
 80 -.1250
 90 -.1250
                     </tableData>
                </table>
            </product>
        </function>

        <function name="aero/coefficient/Cx_q">
            <description>
               Cx due to pitch rate coefficient.
            </description>
            <product>
                <property>aero/qbar-psf</property>
                <property>metrics/Sw-sqft</property>
                <property>aero/ci2vel</property>
                <property>velocities/q-rad_sec</property>
                <table>
                    <independentVar lookup="row">aero/alpha-deg</independentVar>
                    <tableData>
-20 .953
-15 .953
-10 .953
-05 1.55
 00 1.90
 05 2.46
 10 2.92
 15 3.30
 20 2.76
 25 2.05
 30 1.50
 35 1.49
 40 1.83
 45 1.21
 50 1.33
 55 1.61
 60 .910
 70 3.43
 80 .617
 90 .273
                    </tableData>
                </table>
            </product>
        </function>

        <function name="aero/coefficient/Cx_q-lef">
            <description>
               Cx due to pitch rate due to leading edge flaps coefficient.
            </description>
            <product>
                <property>aero/qbar-psf</property>
                <property>metrics/Sw-sqft</property>
                <property>aero/ci2vel</property>
                <property>velocities/q-rad_sec</property>
                <property>fcs/lef-pos-r-norm</property>
                <table>
                    <independentVar lookup="row">aero/alpha-deg</independentVar>
                    <tableData>
-20 -1.22
-15 -1.22
-10 -1.22
-05 -1.66
 00 -1.62
 05 -1.58
 10 -1.96
 15 -2.51
 20 -2.04
 25 -1.64
 30 -.824
 35 -.817
 40 -1.10
 45 -.550
                     </tableData>
                </table>
            </product>
        </function>

    </axis>


    <axis name="Z">

        <function name="aero/coefficient/Cz">
            <description>
               Cz coefficient
            </description>
            <product>
                <property>aero/qbar-psf</property>
                <property>metrics/Sw-sqft</property>
                <table>
                    <independentVar lookup="row">aero/alpha-deg</independentVar>
                    <independentVar lookup="column">aero/beta-deg</independentVar>
                    <independentVar lookup="table">fcs/elevator-pos-deg</independentVar>
                    <tableData breakPoint="-25.0">
       -30    -25    -20    -15    -10     -8     -6     -4     -2      0      2      4      6      8     10     15     20     25     30
-20 1.1940 1.2720 1.3110 1.3560 1.3960 1.3470 1.3390 1.3140 1.3210 1.3150 1.3370 1.3320 1.3400 1.3380 1.2940 1.2350 1.1850 1.1400 1.1000
-15 0.9960 1.0570 1.0900 1.1210 1.1280 1.1290 1.1310 1.1430 1.1580 1.1710 1.1770 1.1420 1.1480 1.1310 1.1370 1.1300 1.1000 1.0600 1.0050
-10 0.7930 0.8320 0.8410 0.8560 0.8870 0.8888 0.8990 0.9090 0.9150 0.9250 0.9100 0.8920 0.8890 0.8810 0.8750 0.8350 0.8210 0.8150 0.7800
-05 0.4100 0.4100 0.4200 0.4250 0.4510 0.4640 0.4740 0.4720 0.4740 0.4690 0.4600 0.4540 0.4470 0.4460 0.4400 0.4240 0.4050 0.3940 0.4030
 00 0.1800 0.1550 0.1350 0.1300 0.1410 0.1490 0.1540 0.1530 0.1510 0.1550 0.1540 0.1510 0.1470 0.1380 0.1390 0.1190 0.1370 0.1230 0.1590
 05 -0.090 -0.130 -0.160 -0.180 -0.184 -0.186 -0.182 -0.187 -0.187 -0.189 -0.193 -0.191 -0.193 -0.195 -0.194 -0.187 -0.171 -0.133 -0.099
 10 -0.340 -0.405 -0.460 -0.498 -0.511 -0.518 -0.526 -0.535 -0.534 -0.530 -0.532 -0.525 -0.520 -0.521 -0.515 -0.498 -0.465 -0.402 -0.341
 15 -0.610 -0.665 -0.720 -0.770 -0.806 -0.818 -0.837 -0.849 -0.851 -0.856 -0.854 -0.855 -0.855 -0.836 -0.827 -0.801 -0.738 -0.664 -0.602
 20 -0.870 -0.950 -1.015 -1.080 -1.122 -1.137 -1.149 -1.154 -1.156 -1.169 -1.151 -1.148 -1.146 -1.135 -1.129 -1.077 -0.994 -0.943 -0.873
 25 -1.170 -1.235 -1.295 -1.355 -1.406 -1.405 -1.429 -1.441 -1.446 -1.446 -1.452 -1.449 -1.455 -1.440 -1.415 -1.356 -1.288 -1.217 -1.167
 30 -1.315 -1.380 -1.445 -1.515 -1.581 -1.671 -1.697 -1.714 -1.719 -1.717 -1.720 -1.709 -1.684 -1.670 -1.651 -1.580 -1.477 -1.463 -1.389
 35 -1.520 -1.570 -1.635 -1.710 -1.788 -1.818 -1.838 -1.889 -1.910 -1.909 -1.909 -1.893 -1.891 -1.846 -1.800 -1.721 -1.640 -1.590 -1.531
 40 -1.600 -1.670 -1.730 -1.810 -1.891 -1.907 -1.911 -1.983 -2.016 -2.037 -1.932 -1.990 -1.969 -1.836 -1.918 -1.839 -1.755 -1.671 -1.630
 45 -1.560 -1.615 -1.685 -1.750 -1.854 -1.991 -2.033 -1.939 -2.003 -1.985 -2.020 -2.040 -1.913 -1.918 -1.946 -1.911 -1.824 -1.689 -1.663
 50 -1.300 -1.480 -1.600 -1.720 -1.880 -1.924 -1.913 -1.866 -1.879 -1.959 -1.992 -2.017 -2.030 -1.942 -2.002 -1.870 -1.738 -1.623 -1.447
 55 -1.705 -1.795 -1.825 -1.850 -1.938 -1.959 -2.012 -1.999 -1.969 -2.010 -1.965 -1.847 -1.895 -1.928 -1.965 -1.755 -1.697 -1.706 -1.618
 60 -1.700 -1.740 -1.730 -1.895 -1.933 -1.880 -1.907 -1.898 -1.892 -1.916 -1.936 -1.877 -1.933 -1.952 -1.915 -1.780 -1.750 -1.750 -1.688
 70 -1.690 -1.740 -1.735 -1.830 -1.813 -1.864 -2.004 -1.950 -1.925 -1.957 -1.905 -1.833 -1.932 -1.952 -1.893 -1.800 -1.853 -1.799 -1.791
 80 -1.935 -1.950 -1.945 -1.920 -1.872 -1.838 -1.908 -1.949 -1.826 -1.816 -1.837 -1.755 -1.848 -1.858 -1.774 -1.810 -1.864 -1.885 -1.834
 90 -1.960 -1.935 -1.850 -1.870 -1.953 -2.036 -2.013 -1.968 -1.990 -1.978 -1.957 -1.956 -1.962 -2.048 -1.970 -1.895 -1.890 -1.969 -1.970
                    </tableData>
                    <tableData breakPoint="-10.0" note="Numbers in this table typed in by E.V.Oort and L.Sonneveldt">
       -30    -25    -20    -15    -10     -8     -6     -4     -2      0      2      4      6      8     10     15     20     25     30
-20 1.1490    1.2140    1.2640    1.2940    1.3270    1.2830    1.2660    1.2450    1.2340    1.2280    1.2580    1.2570    1.2680    1.2650    1.2360  1.1960    1.1540    1.1090    1.0630
-15 0.9480    0.9950    1.0210    1.0470    1.0430    1.0400    1.0370    1.0420    1.0500    1.0590    1.0660    1.0480    1.0510    1.0400    1.0530  1.0510    1.0310    0.9990    0.9550
-10 0.7550    0.7780    0.7770    0.7880    0.8010    0.7990    0.8030    0.8040    0.8120    0.8150    0.8130    0.8050    0.8040    0.8000    0.7970  0.7760    0.7690    0.7650    0.7470
-05 0.3200    0.3200    0.3270    0.3320    0.3500    0.3650    0.3700    0.3720    0.3570    0.3560    0.3520    0.3490    0.3430    0.3370    0.3280  0.3170    0.3090    0.2950    0.3060
 00 0.0860    0.0610    0.0410    0.0390    0.0520    0.0560    0.0620    0.0620    0.0610    0.0640    0.0620    0.0610    0.0580    0.0530    0.0470  0.0350    0.0490    0.0440    0.0760
 05 -0.1920   -0.2320   -0.2620   -0.2790   -0.2800   -0.2840   -0.2810   -0.2870   -0.2870   -0.2870   -0.2890   -0.2910   -0.2890   -0.2910   -0.2930  -0.2920   -0.2750   -0.2440   -0.2050
 10 -0.4550   -0.5220   -0.5750   -0.6110   -0.6240   -0.6320   -0.6410   -0.6470   -0.6500   -0.6500   -0.6510   -0.6460   -0.6420   -0.6380   -0.6350  -0.6220   -0.5870   -0.5240   -0.4630
 15 -0.7140   -0.7840   -0.8460   -0.8980   -0.9330   -0.9490   -0.9670   -0.9760   -0.9770   -0.9800   -0.9800   -0.9780   -0.9770   -0.9630   -0.9510  -0.9230   -0.8640   -0.7900   -0.7170
 20 -1.0050   -1.0880   -1.1610   -1.2230   -1.2630   -1.2840   -1.2990   -1.3060   -1.3020   -1.3060   -1.2920   -1.2890   -1.2870   -1.2790   -1.2660  -1.2200   -1.1460   -1.0900   -1.0050
 25 -1.3130   -1.3780   -1.4450   -1.5090   -1.5600   -1.5660   -1.5830   -1.5900   -1.5950   -1.5940   -1.5970   -1.5950   -1.5950   -1.5840   -1.5660  -1.5050   -1.4450   -1.3740   -1.3070
 30 -1.4180   -1.4980   -1.5780   -1.6630   -1.7460   -1.8250   -1.8480   -1.8610   -1.8610   -1.8630   -1.8630   -1.8560   -1.8360   -1.8160   -1.7950  -1.7350   -1.6130   -1.5570   -1.4700
 35 -1.5420   -1.6290   -1.7190   -1.8190   -1.9190   -1.9770   -2.0330   -2.0640   -2.0790   -2.0900   -2.0810   -2.0750   -2.0670   -2.0340   -1.9890  -1.8960   -1.8000   -1.6960   -1.6130
 40 -1.6710   -1.7680   -1.8620   -1.9670   -2.0740   -2.0770   -2.1510   -2.1840   -2.1990   -2.2160   -2.1920   -2.1940   -2.0840   -2.1100   -2.1110  -1.9960   -1.9000   -1.7870   -1.7020
 45    -1.6150   -1.5770   -1.7700   -1.9630   -2.1300   -2.2170   -2.1840   -2.2160   -2.3060   -2.2630   -2.3040   -2.3040   -2.2420   -2.2350   -2.2100  -2.1210   -1.8910   -1.6540   -1.6960
 50    -1.4060   -1.5920   -1.7160   -1.9440   -2.0260   -2.0810   -2.0810   -2.0330   -2.0310   -2.0970   -2.1180   -2.1310   -2.1420   -2.0620   -2.1290  -2.0470   -1.8190   -1.6950   -1.5090
 55    -1.6880   -1.7380   -1.7210   -1.8090   -2.0140   -2.0480   -2.1120   -2.1000   -2.0580   -2.0880   -2.0670   -1.9720   -2.0160   -2.0190   -2.0250  -1.8200   -1.7320   -1.7490   -1.6690
 60    -1.7240   -1.7930   -1.8000   -1.7560   -1.9490   -1.9230   -1.9750   -1.9900   -2.0050   -2.0510   -2.0210   -1.9140   -1.9560   -1.9980   -1.9850  -1.7920   -1.8360   -1.8290   -1.7600
 70    -1.7430   -1.7540   -1.8110   -1.7810   -1.8390   -1.8970   -2.0040   -1.9990   -1.9860   -2.0270   -1.9430   -1.8350   -1.9250   -1.9930   -1.9210  -1.8630   -1.8930   -1.8360   -1.8250
 80    -1.9350   -1.9930   -1.9790   -1.9910   -1.9280   -1.8770   -1.9310   -1.9810   -1.8920   -1.9160   -1.9380   -1.8560   -1.9430   -1.9470   -1.8480  -1.9110   -1.8990   -1.9130   -1.8550
 90    -1.9900   -2.0090   -1.9500   -1.9790   -2.0060   -2.0850   -2.0190   -2.0070   -2.0190   -1.9980   -1.9900   -2.0040   -2.0360   -2.1020   -2.0030  -1.9760   -1.9470   -2.0060   -1.9870
                     </tableData>
                    <tableData breakPoint="0.0">
       -30    -25    -20    -15    -10     -8     -6     -4     -2      0      2      4      6      8     10     15     20     25     30
-20 1.0910 1.1400 1.2030 1.2150 1.2390 1.2010 1.1710 1.1570 1.1220 1.1160 1.1560 1.1600 1.1750 1.1720 1.1610 1.1450 1.1150 1.0700 1.0150
-15 0.9050 0.9390 0.9590 0.9800 0.9670 0.9600 0.9540 0.9510 0.9530 0.9590 0.9660 0.9640 0.9650 0.9590 0.9780 0.9800 0.0700 0.9450 0.9100
-10 0.7130 0.7190 0.7060 0.7110 0.7050 0.6990 0.6960 0.6870 0.6970 0.6920 0.7050 0.7080 0.7100 0.7100 0.7090 0.7100 0.7100 0.7100 0.7100
-05 0.2650 0.2650 0.2700 0.2750 0.2880 0.3050 0.3060 0.3110 0.2850 0.2870 0.2860 0.2850 0.2800 0.2710 0.2600 0.2510 0.2510 0.2340 0.2470
 00 -0.006 -0.030 -0.050 -0.050 -0.036 -0.035 -0.028 -0.027 -0.027 -0.025 -0.028 -0.028 -0.029 -0.031 -0.034 -0.048 -0.037 -0.033 -0.006
 05 -0.275 -0.315 -0.345 -0.360 -0.359 -0.364 -0.362 -0.368 -0.368 -0.367 -0.368 -0.372 -0.368 -0.370 -0.373 -0.377 -0.360 -0.335 -0.292
 10 -0.550 -0.620 -0.670 -0.705 -0.719 -0.727 -0.737 -0.741 -0.747 -0.750 -0.750 -0.746 -0.744 -0.736 -0.735 -0.725 -0.689 -0.626 -0.564
 15 -0.825 -0.910 -0.980 -1.035 -1.069 -1.089 -1.105 -1.111 -1.111 -1.112 -1.112 -1.108 -1.106 -1.098 -1.083 -1.053 -0.999 -0.924 -0.840
 20 -1.115 -1.200 -1.280 -1.340 -1.379 -1.405 -1.421 -1.431 -1.422 -1.418 -1.408 -1.405 -1.403 -1.396 -1.382 -1.336 -1.271 -1.210 -1.113
 25 -1.375 -1.440 -1.510 -1.575 -1.626 -1.635 -1.650 -1.655 -1.659 -1.658 -1.660 -1.658 -1.655 -1.646 -1.631 -1.570 -1.513 -1.442 -1.367
 30 -1.520 -1.615 -1.710 -1.810 -1.910 -1.977 -1.997 -2.006 -2.002 -2.008 -2.006 -2.001 -1.981 -1.961 -1.939 -1.888 -1.799 -1.651 -1.550
 35 -1.555 -1.665 -1.770 -1.885 -1.998 -2.073 -2.152 -2.171 -2.182 -2.200 -2.186 -2.186 -2.174 -2.149 -2.104 -2.002 -1.897 -1.760 -1.663
 40 -1.715 -1.830 -1.945 -2.065 -2.188 -2.183 -2.301 -2.310 -2.314 -2.328 -2.355 -2.231 -2.156 -2.281 -2.231 -2.095 -1.991 -1.860 -1.747
 45 -1.625 -1.570 -1.785 -2.000 -2.178 -2.272 -2.210 -2.264 -2.358 -2.311 -2.353 -2.350 -2.299 -2.290 -2.255 -2.157 -2.002 -1.648 -1.702
 50 -1.570 -1.735 -1.900 -2.050 -2.165 -2.254 -2.288 -2.258 -2.258 -2.326 -2.312 -2.290 -2.277 -2.184 -2.239 -2.109 -1.986 -1.848 -1.649
 55 -1.775 -1.900 -1.970 -2.055 -2.176 -2.184 -2.223 -2.211 -2.196 -2.252 -2.235 -2.145 -2.182 -2.165 -2.152 -2.025 -1.965 -1.931 -1.800
 60 -1.900 -1.935 -1.960 -1.995 -2.128 -2.111 -2.173 -2.183 -2.181 -2.208 -2.190 -2.094 -2.131 -2.150 -2.114 -1.990 -1.986 -1.962 -1.876
 70 -1.930 -1.945 -1.940 -1.920 -1.929 -2.021 -2.161 -2.160 -2.120 -2.134 -2.085 -2.011 -2.108 -2.125 -2.063 -1.970 -2.016 -1.947 -1.924
 80 -2.000 -2.045 -2.075 -2.080 -2.045 -1.994 -2.048 -2.092 -1.992 -2.004 -2.019 -1.930 -2.014 -2.018 -1.919 -2.000 -2.034 -2.032 -1.958
 90 -1.960 -1.950 -1.900 -2.010 -2.060 -2.158 -2.112 -2.117 -2.145 -2.140 -2.110 -2.107 -2.101 -2.169 -2.073 -2.074 -2.038 -2.088 -2.060
                    </tableData>
                    <tableData breakPoint="10.0" note="Numbers in this table typed in by E.V.Oort and L.Sonneveldt">
       -30    -25    -20    -15    -10     -8     -6     -4     -2      0      2      4      6      8     10     15     20     25     30
-20 1.0210    1.0660    1.1160    1.1260    1.1390    1.1080    1.1030    1.0700    1.0410    1.0390    1.0710    1.0760    1.0890    1.0860    1.0780   1.0700    1.0460    1.0070    0.9570
-15     0.8150    0.8380    0.8460    0.8630    0.8540    0.8480    0.8440    0.8410    0.8460    0.8490    0.8560    0.8520    0.8530    0.8480    0.8630   0.8630    0.8560    0.8410    0.8200
-10     0.6220    0.6180    0.6030    0.6090    0.6060    0.6020    0.5990    0.5920    0.6000    0.5960    0.6050    0.6070    0.6090    0.6090    0.6090   0.6070    0.6070    0.6110    0.6190
-05     0.1810    0.1760    0.1790    0.1840    0.1980    0.2120    0.2130    0.2150    0.2020    0.2050    0.2020    0.1980    0.1920    0.1830    0.1800    0.1650    0.1630    0.1550    0.1690
 00    -0.0690   -0.1000   -0.1250   -0.1310   -0.1220   -0.1200   -0.1140   -0.1120   -0.1150   -0.1140   -0.1170   -0.1170   -0.1210   -0.1230   -0.1260   -0.1340   -0.1220   -0.1090   -0.0750
 05    -0.3390   -0.4000   -0.4440   -0.4740   -0.4800   -0.4800   -0.4810   -0.4860   -0.4870   -0.4900   -0.4900   -0.5040   -0.4960   -0.4910   -0.4930  -0.4830   -0.4580   -0.4120   -0.3540
 10    -0.5850   -0.6300   -0.7150   -0.7680   -0.8060   -0.8100   -0.8240   -0.8330   -0.8440   -0.8490   -0.8510   -0.8420   -0.8460   -0.8310   -0.8250  -0.8010   -0.7520   -0.6760   -0.5950
 15    -0.8430   -0.9470   -1.0310   -1.0970   -1.1330   -1.1470   -1.1670   -1.1750   -1.1820   -1.1770   -1.1710   -1.1760   -1.1750   -1.1710   -1.1580  -1.1200   -1.0470   -0.9540   -0.8640
 20    -1.1040   -1.2000   -1.2870   -1.3560   -1.4040   -1.4310   -1.4460   -1.4530   -1.4450   -1.4420   -1.4350   -1.4300   -1.4340   -1.4280   -1.4140  -1.3570   -1.2860   -1.2150   -1.1100
 25    -1.3620   -1.4580   -1.5600   -1.6550   -1.7410   -1.7710   -1.7710   -1.7820   -1.7940   -1.7890   -1.7870   -1.7910   -1.7750   -1.7750   -1.7600  -1.6460   -1.5820   -1.4730   -1.3700
 30    -1.5200   -1.6300   -1.7400   -1.8540   -1.9680   -2.0370   -2.0700   -2.0810   -2.0830   -2.0820   -2.0800   -2.0700   -2.0540   -2.0390   -2.0160  -1.9290   -1.7900   -1.6730   -1.5630
 35    -1.6900   -1.8560   -2.0060   -2.1360   -2.2520   -2.2550   -2.2600   -2.3260   -2.3170   -2.3080   -2.3550   -2.3410   -2.3020   -2.2590   -2.2190  -2.0810   -1.9380   -1.7600   -1.6790
 40    -1.8490   -1.9490   -2.0540   -2.1690   -2.2900   -2.3610   -2.3430   -2.3750   -2.2840   -2.4110   -2.4190   -2.4020   -2.3450   -2.3330   -2.3030  -2.1630   -2.0650   -1.9710   -1.8780
 45    -1.5900   -1.4840   -1.7410   -2.0000   -2.1930   -2.2790   -2.1860   -2.2620   -2.3950   -2.3060   -2.3730   -2.3690   -2.2950   -2.2930   -2.2620  -2.1750   -1.9930   -1.5550   -1.6610
 50    -1.7070   -1.8910   -2.0130   -2.2550   -2.1410   -2.2000   -2.2040   -2.1650   -2.1790   -2.2610   -2.2830   -2.2810   -2.2940   -2.1820   -2.2180  -2.1780   -1.9360   -1.8140   -1.6300
 55    -1.7350   -1.8380   -1.8440   -1.9040   -2.1330   -2.1590   -2.2170   -2.2090   -2.1840   -2.2310   -2.1860   -2.0680   -2.1150   -2.1450   -2.1800   -1.9510   -1.8910   -1.8850   -1.7820
 60    -1.7990   -1.8890   -1.9170   -1.9420   -2.0970   -2.0650   -2.1120   -2.1230   -2.1400   -2.1850   -2.1640   -2.0650   -2.1070   -2.1420   -2.1210  -1.9660   -1.9410   -1.9130   -1.8230
 70    -1.7530   -1.7520   -1.7970   -1.7790   -1.9870   -2.0480   -2.1570   -2.1490   -2.0480   -2.2680   -2.1780   -2.0640   -2.1420   -2.1610   -2.1020  -1.8940   -1.9120   -1.8670   -1.8680
 80    -2.0670   -2.1230   -2.1070   -2.1450   -2.0530   -1.9110   -1.9740   -2.0240   -1.9260   -1.9400   -1.9670   -1.8910   -1.9780   -1.9760   -1.8720  -1.9640   -1.9260   -1.9420   -1.8860
 90    -2.0080   -2.0200   -1.9550   -2.0760   -2.0260   -2.1160   -2.0610   -2.0570   -2.0730   -2.0570   -2.0340   -2.0330   -2.0300   -2.0950   -1.9960   -2.0460   -1.9250   -1.9900   -1.9780
                    </tableData>
                    <tableData breakPoint="25.0">
       -30    -25    -20    -15    -10     -8     -6     -4     -2      0      2      4      6      8     10     15     20     25     30
-20 0.7230 0.7500 0.7440 0.7440 0.7110 0.7090 0.6970 0.6970 0.6960 0.7100 0.7040 0.7150 0.7200 0.7210 0.7210 0.7500 0.7500 0.7400 0.7100
-15 0.5120 0.4950 0.4610 0.4650 0.4700 0.4700 0.4710 0.4670 0.4830 0.4760 0.4810 0.4720 0.4750 0.4730 0.4730 0.4650 0.4700 0.4900 0.5150
-10 0.2490 0.2120 0.1860 0.1950 0.2030 0.2050 0.2020 0.2030 0.2070 0.2050 0.2000 0.1940 0.1980 0.1980 0.2010 0.1850 0.1900 0.2100 0.2500
-05 0.1000 0.0900 0.0900 0.0950 0.1110 0.1220 0.1220 0.1220 0.1210 0.1250 0.1210 0.1140 0.1070 0.0970 0.1010 0.0810 0.0770 0.0770 0.0930
 00 -.1500 -.1900 -.2200 -.2350 -.2320 -.2240 -.2240 -.2210 -.2270 -.2280 -.2310 -.2320 -.2390 -.2410 -.2440 -.2440 -.2320 -.2070 -.1640
 05 -.3850 -.4600 -.5150 -.5550 -.5660 -.5630 -.5660 -.5710 -.5720 -.5780 -.5780 -.5990 -.5880 -.5770 -.5790 -.5590 -.5280 -.4670 -.3980
 10 -.6200 -.2900 -.7600 -.8300 -.8920 -.8910 -.9100 -.9240 -.9390 -.9460 -.9490 -.9360 -.9450 -.9240 -.9130 -.8760 -.8130 -.7240 -.6260
 15 -0.865 -0.990 -1.090 -1.170 -1.208 -1.215 -1.239 -1.250 -1.269 -1.253 -1.240 -1.255 -1.255 -1.257 -1.245 -1.198 -1.103 -0.990 -0.891
 20 -1.055 -1.195 -1.320 -1.430 -1.519 -1.550 -1.564 -1.558 -1.555 -1.554 -1.563 -1.549 -1.577 -1.578 -1.563 -1.453 -1.358 -1.241 -1.097
 25 -1.360 -1.460 -1.570 -1.670 -1.763 -1.797 -1.794 -1.806 -1.820 -1.814 -1.811 -1.816 -1.798 -1.800 -1.785 -1.661 -1.595 -1.479 -1.371
 30 -1.520 -1.635 -1.750 -1.870 -1.989 -2.058 -2.095 -2.107 -2.112 -2.108 -2.106 -2.094 -2.079 -2.066 -2.043 -1.943 -1.804 -1.681 -1.568
 35 -1.615 -1.750 -1.875 -1.995 -2.111 -2.145 -2.200 -2.240 -2.242 -2.248 -2.261 -2.255 -2.231 -2.198 -2.155 -2.037 -1.915 -1.760 -1.670
 40 -1.775 -1.875 -1.980 -2.095 -2.216 -2.287 -2.269 -2.301 -2.210 -2.337 -2.345 -2.328 -2.271 -2.259 -2.229 -2.089 -1.991 -1.897 -1.804
 45 -1.740 -1.845 -1.925 -2.000 -2.130 -2.251 -2.286 -2.270 -2.239 -2.327 -2.289 -2.288 -2.312 -2.282 -2.232 -2.099 -2.030 -1.945 -1.834
 50 -1.570 -1.740 -1.900 -2.050 -2.156 -2.216 -2.203 -2.158 -2.175 -2.261 -2.266 -2.262 -2.255 -2.153 -2.201 -2.110 -1.984 -1.841 -1.637
 55 -1.700 -1.810 -1.880 -1.950 -2.043 -2.170 -2.184 -2.111 -2.204 -2.231 -2.203 -2.102 -2.135 -2.173 -2.107 -1.950 -1.892 -1.877 -1.765
 60 -1.795 -1.895 -1.960 -2.020 -2.113 -2.094 -2.124 -2.124 -2.134 -2.174 -2.177 -2.103 -2.153 -2.176 -2.144 -2.000 -1.960 -1.930 -1.838
 70 -1.780 -1.785 -1.790 -1.810 -1.873 -1.943 -2.059 -2.274 -2.000 -2.259 -2.211 -1.885 -2.221 -2.212 -2.125 -1.970 -1.907 -1.882 -1.874
 80 -1.950 -1.980 -1.980 -1.960 -1.911 -1.881 -1.955 -2.005 -1.894 -1.899 -2.009 -2.014 -2.101 -2.014 -1.825 -1.840 -1.899 -1.922 -1.873
 90 -1.925 -1.920 -1.870 -1.885 -1.969 -2.071 -2.029 -2.039 -2.070 -2.069 -2.026 -2.005 -2.000 -2.085 -2.007 -1.935 -1.948 -1.989 -1.951
                     </tableData>
                </table>
            </product>
        </function>

        <function name="aero/coefficient/delta-Cz_lef">
            <description>
               Cz due to leading edge flaps coefficient.
            </description>
            <product>
                <property>aero/qbar-psf</property>
                <property>metrics/Sw-sqft</property>
                <property>fcs/lef-pos-r-norm</property>
                <difference>
                <table name="Cz_lef">
                    <independentVar lookup="row">aero/alpha-deg</independentVar>
                    <independentVar lookup="column">aero/beta-deg</independentVar>
                    <tableData>
       -30    -25    -20    -15    -10     -8     -6     -4     -2      0      2      4      6      8     10     15     20     25     30
-20 1.1830 1.2460 1.2790 1.2900 1.3690 1.3640 1.2970 1.2770 1.2760 1.2560 1.2810 1.2800 1.3120 1.3150 1.3060 1.2270 1.2160 1.1830 1.1200
-15 0.9600 1.0180 1.0550 1.0930 1.0580 1.0390 1.0310 1.0190 1.0250 1.0350 1.0330 1.0420 1.0430 1.0560 1.0560 1.0910 1.0530 1.0160 0.9580
-10 0.7090 0.7100 0.7020 0.7040 0.7010 0.7100 0.7300 0.7290 0.7290 0.7250 0.7290 0.7280 0.7280 0.7230 0.7110 0.7140 0.7120 0.7200 0.7190
-05 0.2220 0.2160 0.2310 0.2270 0.2400 0.2430 0.2440 0.2490 0.2490 0.2480 0.2480 0.2420 0.2390 0.2350 0.2290 0.2160 0.2200 0.2050 0.2110
 00 -.0660 -.0840 -.0900 -.1050 -.1040 -.0990 -.1070 -.0990 -.0990 -.1000 -.1010 -.1040 -.1040 -.1040 -.1060 -.1070 -.0920 -.0860 -.0680
 05 -.3170 -.3470 -.3900 -.4140 -.4200 -.4170 -.4170 -.4210 -.4240 -.4280 -.4210 -.4280 -.4220 -.4230 -.4250 -.4190 -.3950 -.5320 -.3220
 10 -.5690 -.6190 -.6790 -.7030 -.7280 -.7650 -.7720 -.7740 -.7720 -.7740 -.7700 -.7670 -.7610 -.7540 -.7560 -.7310 -.7070 -.6450 -.5970
 15 -0.853 -0.929 -1.018 -1.070 -1.098 -1.116 -1.114 -1.151 -1.142 -1.139 -1.135 -1.118 -1.112 -1.107 -1.099 -1.071 -1.019 -0.930 -0.854
 20 -1.106 -1.168 -1.228 -1.314 -1.348 -1.359 -1.362 -1.352 -1.357 -1.355 -1.371 -1.376 -1.370 -1.379 -1.399 -1.365 -1.279 -1.219 -1.157
 25 -1.314 -1.407 -1.465 -1.506 -1.564 -1.598 -1.628 -1.647 -1.646 -1.650 -1.642 -1.641 -1.618 -1.599 -1.585 -1.527 -1.486 -1.428 -1.335
 30 -1.496 -1.510 -1.589 -1.692 -1.775 -1.814 -1.846 -1.875 -1.879 -1.883 -1.891 -1.876 -1.843 -1.838 -1.811 -1.729 -1.625 -1.546 -1.532
 35 -1.594 -1.694 -1.807 -1.875 -1.957 -1.976 -2.032 -2.060 -2.070 -2.077 -2.038 -2.039 -2.028 -2.005 -1.986 -1.904 -1.836 -1.713 -1.623
 40 -1.683 -1.755 -1.912 -1.999 -2.111 -2.149 -2.147 -2.204 -2.207 -2.204 -2.205 -2.195 -2.193 -2.174 -2.133 -2.021 -1.934 -1.777 -1.705
 45 -1.664 -1.783 -1.859 -1.962 -2.030 -2.129 -1.917 -2.143 -2.050 -2.208 -2.201 -2.182 -2.077 -2.209 -2.126 -2.058 -1.955 -1.879 -1.790
                     </tableData>
                </table>
                <table name="Cz_dh0">
                    <independentVar lookup="row">aero/alpha-deg</independentVar>
                    <independentVar lookup="column">aero/beta-deg</independentVar>
                    <tableData>
       -30    -25    -20    -15    -10     -8     -6     -4     -2      0      2      4      6      8     10     15     20     25     30
-20 1.0910 1.1400 1.2030 1.2150 1.2390 1.2010 1.1710 1.1570 1.1220 1.1160 1.1560 1.1600 1.1750 1.1720 1.1610 1.1450 1.1150 1.0700 1.0150
-15 0.9050 0.9390 0.9590 0.9800 0.9670 0.9600 0.9540 0.9510 0.9530 0.9590 0.9660 0.9640 0.9650 0.9590 0.9780 0.9800 0.0700 0.9450 0.9100
-10 0.7130 0.7190 0.7060 0.7110 0.7050 0.6990 0.6960 0.6870 0.6970 0.6920 0.7050 0.7080 0.7100 0.7100 0.7090 0.7100 0.7100 0.7100 0.7100
-05 0.2650 0.2650 0.2700 0.2750 0.2880 0.3050 0.3060 0.3110 0.2850 0.2870 0.2860 0.2850 0.2800 0.2710 0.2600 0.2510 0.2510 0.2340 0.2470
 00 -0.006 -0.030 -0.050 -0.050 -0.036 -0.035 -0.028 -0.027 -0.027 -0.025 -0.028 -0.028 -0.029 -0.031 -0.034 -0.048 -0.037 -0.033 -0.006
 05 -0.275 -0.315 -0.345 -0.360 -0.359 -0.364 -0.362 -0.368 -0.368 -0.367 -0.368 -0.372 -0.368 -0.370 -0.373 -0.377 -0.360 -0.335 -0.292
 10 -0.550 -0.620 -0.670 -0.705 -0.719 -0.727 -0.737 -0.741 -0.747 -0.750 -0.750 -0.746 -0.744 -0.736 -0.735 -0.725 -0.689 -0.626 -0.564
 15 -0.825 -0.910 -0.980 -1.035 -1.069 -1.089 -1.105 -1.111 -1.111 -1.112 -1.112 -1.108 -1.106 -1.098 -1.083 -1.053 -0.999 -0.924 -0.840
 20 -1.115 -1.200 -1.280 -1.340 -1.379 -1.405 -1.421 -1.431 -1.422 -1.418 -1.408 -1.405 -1.403 -1.396 -1.382 -1.336 -1.271 -1.210 -1.113
 25 -1.375 -1.440 -1.510 -1.575 -1.626 -1.635 -1.650 -1.655 -1.659 -1.658 -1.660 -1.658 -1.655 -1.646 -1.631 -1.570 -1.513 -1.442 -1.367
 30 -1.520 -1.615 -1.710 -1.810 -1.910 -1.977 -1.997 -2.006 -2.002 -2.008 -2.006 -2.001 -1.981 -1.961 -1.939 -1.888 -1.799 -1.651 -1.550
 35 -1.555 -1.665 -1.770 -1.885 -1.998 -2.073 -2.152 -2.171 -2.182 -2.200 -2.186 -2.186 -2.174 -2.149 -2.104 -2.002 -1.897 -1.760 -1.663
 40 -1.715 -1.830 -1.945 -2.065 -2.188 -2.183 -2.301 -2.310 -2.314 -2.328 -2.355 -2.231 -2.156 -2.281 -2.231 -2.095 -1.991 -1.860 -1.747
 45 -1.625 -1.570 -1.785 -2.000 -2.178 -2.272 -2.210 -2.264 -2.358 -2.311 -2.353 -2.350 -2.299 -2.290 -2.255 -2.157 -2.002 -1.648 -1.702
 50 -1.570 -1.735 -1.900 -2.050 -2.165 -2.254 -2.288 -2.258 -2.258 -2.326 -2.312 -2.290 -2.277 -2.184 -2.239 -2.109 -1.986 -1.848 -1.649
 55 -1.775 -1.900 -1.970 -2.055 -2.176 -2.184 -2.223 -2.211 -2.196 -2.252 -2.235 -2.145 -2.182 -2.165 -2.152 -2.025 -1.965 -1.931 -1.800
 60 -1.900 -1.935 -1.960 -1.995 -2.128 -2.111 -2.173 -2.183 -2.181 -2.208 -2.190 -2.094 -2.131 -2.150 -2.114 -1.990 -1.986 -1.962 -1.876
 70 -1.930 -1.945 -1.940 -1.920 -1.929 -2.021 -2.161 -2.160 -2.120 -2.134 -2.085 -2.011 -2.108 -2.125 -2.063 -1.970 -2.016 -1.947 -1.924
 80 -2.000 -2.045 -2.075 -2.080 -2.045 -1.994 -2.048 -2.092 -1.992 -2.004 -2.019 -1.930 -2.014 -2.018 -1.919 -2.000 -2.034 -2.032 -1.958
 90 -1.960 -1.950 -1.900 -2.010 -2.060 -2.158 -2.112 -2.117 -2.145 -2.140 -2.110 -2.107 -2.101 -2.169 -2.073 -2.074 -2.038 -2.088 -2.060
                    </tableData>
                </table>
            </difference>
            </product>
        </function>

        <function name="aero/coefficient/Cz_sb">
            <description>
               Cz due speed brake coefficient.
            </description>
            <product>
                <property>aero/qbar-psf</property>
                <property>metrics/Sw-sqft</property>
                <property>fcs/speedbrake-pos-norm</property>
                <table>
                    <independentVar lookup="row">aero/alpha-deg</independentVar>
                    <tableData>
-20 -.3858
-15 -.3858
 00 -.3858
 15 -.4248
 30 0.0438
 45 -.0097
 60 -.0010
 90 -.0369
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                     </tableData>
                </table>
            </product>
        </function>

        <function name="aero/coefficient/Cz_q">
            <description>
               Cz due to pitch rate coefficient.
            </description>
            <product>
                <property>aero/qbar-psf</property>
                <property>metrics/Sw-sqft</property>
                <property>aero/ci2vel</property>
                <property>velocities/q-rad_sec</property>
                <table>
                    <independentVar lookup="row">aero/alpha-deg</independentVar>
                    <tableData>
-20 -23.9
-15 -23.9
 00 -29.5
 15 -30.1
 30 -29.0
 45 -35.3
 60 -25.2
 90 -2.14
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                    </tableData>
                </table>
            </product>
        </function>

        <function name="aero/coefficient/Cz_q-lef">
            <description>
               Cz due to pitch rate due to leading edge flaps coefficient.
            </description>
            <product>
                <property>aero/qbar-psf</property>
                <property>metrics/Sw-sqft</property>
                <property>aero/ci2vel</property>
                <property>velocities/q-rad_sec</property>
                <property>fcs/lef-pos-r-norm</property>
                <table>
                    <independentVar lookup="row">aero/alpha-deg</independentVar>
                    <tableData>
-20 15.1
-15 15.1
-05 3.70
 05 -1.3
 15 -3.8
 25 -.20
 35 -3.5
 45 -.65
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                     </tableData>
                </table>
            </product>
        </function>

    </axis>


    <function name="aero/function/n_dh">
        <description>
           Elevator effectiveness factor.
        </description>
        <product>
            <table>
                <independentVar lookup="row">fcs/elevator-pos-deg</independentVar>
                <tableData>
-25 1.0
-10 1.0
 00 1.0
 10 1.0
 25 .95
                 </tableData>
            </table>
        </product>
    </function>

    <axis name="PITCH">

        <function name="aero/coefficient/Cm">
            <description>
               Cm coefficient
            </description>
            <product>
                <property>aero/qbar-psf</property>
                <property>metrics/Sw-sqft</property>
                <property>metrics/cbarw-ft</property>
                <p>aero/function/n_dh</p>
                <table>
                    <independentVar lookup="row">aero/alpha-deg</independentVar>
                    <independentVar lookup="column">aero/beta-deg</independentVar>
                    <independentVar lookup="table">fcs/elevator-pos-deg</independentVar>
                    <tableData breakPoint="-25.0" note="Numbers in this table typed in by E.V.Oort and L.Sonneveldt">
       -30    -25    -20    -15    -10     -8     -6     -4     -2      0      2      4      6      8     10     15     20     25     30
-20 0.2059    0.1937    0.1918    0.1850    0.1692    0.1693    0.1770    0.1746    0.1742    0.1750    0.1721    0.1758    0.1801    0.1826    0.1912   0.2070    0.2140    0.2160    0.2270
 00     0.1530    0.1540    0.1480    0.1450    0.1445    0.1438    0.1430    0.1411    0.1412    0.1409    0.1410    0.1409    0.1403    0.1409    0.1414   0.1448    0.1453    0.1523    0.1513
 20     0.1510    0.1700    0.1900    0.2020    0.2073    0.2098    0.2122    0.2129    0.2137    0.2152    0.2133    0.2118    0.2109    0.2082    0.2061   0.1991    0.1878    0.1618    0.1479
 40     0.1130    0.0500    0.0600    0.0870    0.1131    0.1279    0.1341    0.1433    0.1483    0.1478    0.1291    0.1312    0.1245    0.1025    0.1028    0.0745    0.0495    0.0406    0.1024
 60    -0.0360   -0.0230   -0.0750   -0.0600   -0.0627   -0.0705   -0.0556   -0.0534   -0.0549   -0.0540   -0.0618   -0.0674   -0.0828   -0.0849   -0.1004  -0.0976   -0.1117   -0.0599   -0.0714
 90    -0.5260   -0.5270   -0.5150   -0.5040   -0.4900   -0.5157   -0.4801   -0.4970   -0.4831   -0.4723   -0.4830   -0.4818   -0.4911   -0.5074   -0.4863  -0.5001   -0.5124   -0.5227   -0.5219
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                    </tableData>
                    <tableData breakPoint="-10.0" note="Numbers in this table typed in by E.V.Oort and L.Sonneveldt">
       -30    -25    -20    -15    -10     -8     -6     -4     -2      0      2      4      6      8     10     15     20     25     30
-20 0.1469    0.1272    0.1210    0.1075    0.0798    0.0756    0.0800    0.0827    0.0853    0.0864    0.0782    0.0811    0.0821    0.0847    0.0965   0.1240    0.1376    0.1439    0.1631
 00     0.0520    0.0540    0.0430    0.0390    0.0420    0.0410    0.0420    0.0430    0.0430    0.0430    0.0420    0.0430    0.0370    0.0380    0.0378   0.0430    0.0450    0.0570    0.0500
 20     0.0270    0.0250    0.0400    0.0500    0.0570    0.0560    0.0580    0.0600    0.0650    0.0674    0.0690    0.0660    0.0620    0.0550    0.0520   0.0460    0.0360    0.0200    0.0220
 40     0.0680    0.0190   -0.0160   -0.0130   -0.0080   -0.0070   -0.0060   -0.0050   -0.0060   -0.0094   -0.0220   -0.0220   -0.0440   -0.0380   -0.0410  -0.0470   -0.0500   -0.0130    0.0330
 60    -0.0879   -0.0315   -0.0384   -0.1757   -0.0962   -0.1050   -0.0912   -0.0857   -0.0794   -0.0708   -0.0887   -0.1045   -0.1247   -0.1264   -0.1414  -0.2209   -0.0836   -0.0767   -0.1331
 90    -0.6208   -0.6173   -0.6028   -0.5959   -0.5532   -0.5881   -0.5617   -0.5859   -0.5773   -0.5718   -0.5728   -0.5618   -0.5680   -0.5878   -0.5702  -0.5789   -0.5858   -0.6003   -0.6038
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                     </tableData>
                    <tableData breakPoint="0.0">
       -30    -25    -20    -15    -10     -8     -6     -4     -2      0      2      4      6      8     10     15     20     25     30
-20 0.0978 0.0719 0.0621 0.0430 0.0054 0.0023 0.0006 0.0062 0.0114 0.0127 0.0001 0.0023 0.0006 0.0033 0.0177 0.0550 0.0740 0.0840 0.1100
 00 -.0550 -.0460 -.0590 -.0640 -.0660 -.0660 -.0639 -.0615 -.0605 -.0598 -.0600 -.0606 -.0608 -.0617 -.0621 -.0606 -.0587 -.0484 -.0517
 20 -.0570 -.0710 -.0620 -.0520 -.0478 -.0518 -.0498 -.0463 -.0384 -.0342 -.0329 -.0366 -.0426 -.0532 -.0555 -.0620 -.0705 -.0800 -.0660
 40 0.0450 0.0050 -.0520 -.0610 -.0662 -.0729 -.0739 -.0789 -.0820 -.0835 -.0917 -.0971 -.1252 -.1071 -.1116 -.1057 -.0979 -.0402 0.0022
 60 -.1830 -.1480 -.1730 -.1720 -.1512 -.1428 -.1118 -.1094 -.1266 -.1414 -.1436 -.1437 -.1521 -.1459 -.1530 -.1709 -.1741 -.1475 -.1841
 90 -.6330 -.6300 -.6160 -.6160 -.6067 -.6366 -.6053 -.6281 -.6217 -.6184 -.6163 -.6022 -.6073 -.6281 -.6115 -.6209 -.6210 -.6351 -.6381
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                    </tableData>
                    <tableData breakPoint="10.0" note="Numbers in this table typed in by E.V.Oort and L.Sonneveldt">
       -30    -25    -20    -15    -10     -8     -6     -4     -2      0      2      4      6      8     10     15     20     25     30
-20 0.0200   -0.0036   -0.0107   -0.0334   -0.0778   -0.0944   -0.0926   -0.0855   -0.0815   -0.0835   -0.0955   -0.0930   -0.0943   -0.0881   -0.0743  -0.0265   -0.0040    0.0034    0.0268
 00    -0.1170   -0.1270   -0.1520   -0.1590   -0.1600   -0.1600   -0.1590   -0.1570   -0.1620   -0.1610   -0.1620   -0.1630   -0.1670   -0.1620   -0.1620  -0.1620   -0.1530   -0.1260   -0.1170
 20    -0.0620   -0.0830   -0.0970   -0.1060   -0.1340   -0.1420   -0.1380   -0.1340   -0.1300   -0.1264   -0.1260   -0.1260   -0.1510   -0.1610   -0.1660  -0.1370   -0.1260   -0.1150   -0.0940
 40    -0.0438   -0.1079   -0.1281   -0.1485   -0.1405   -0.1272   -0.1301   -0.1367   -0.1555   -0.1450   -0.1543   -0.1595   -0.1527   -0.1644   -0.1682  -0.1791   -0.1553   -0.1362   -0.0744
 60    -0.1710   -0.1200   -0.1350   -0.1400   -0.1588   -0.1634   -0.1455   -0.1444   -0.1512   -0.1556   -0.1653   -0.1719   -0.1866   -0.1859   -0.1985  -0.1808   -0.1758   -0.1621   -0.2116
 90    -0.6368   -0.6326   -0.6174   -0.6217   -0.5909   -0.6214   -0.5906   -0.6146   -0.6099   -0.6083   -0.6080   -0.5958   -0.5979   -0.6109   -0.5865  -0.6173   -0.6130   -0.6282   -0.6324
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                    </tableData>
                    <tableData breakPoint="25.0" note="Numbers in this table typed in by E.V.Oort and L.Sonneveldt">
       -30    -25    -20    -15    -10     -8     -6     -4     -2      0      2      4      6      8     10     15     20     25     30
-20 -0.0818   -0.1023   -0.1060   -0.1334   -0.1866   -0.2149   -0.2128   -0.2055   -0.2030   -0.2093   -0.2204   -0.2176   -0.2185   -0.2077   -0.1946  -0.1330   -0.1060   -0.1020   -0.0820
 00    -0.1740   -0.1970   -0.2340   -0.2470   -0.2487   -0.2486   -0.2493   -0.2489   -0.2539   -0.2527   -0.2524   -0.2524   -0.2532   -0.2517   -0.2491  -0.2491   -0.2359   -0.1983   -0.1748
 20    -0.0680   -0.0930   -0.1240   -0.1540   -0.2203   -0.2311   -0.2272   -0.2205   -0.2205   -0.2165   -0.2182   -0.2138   -0.2589   -0.2705   -0.2751  -0.2111   -0.1811   -0.1482   -0.1227
 40    -0.0250   -0.0840   -0.1120   -0.1300   -0.1248   -0.1157   -0.1182   -0.1245   -0.1400   -0.1320   -0.1411   -0.1463   -0.1532   -0.1523   -0.1562  -0.1636   -0.1432   -0.1159   -0.0582
 60    -0.1430   -0.0820   -0.0850   -0.0910   -0.1251   -0.1492   -0.1507   -0.1570   -0.1589   -0.1584   -0.1689   -0.1773   -0.1947   -0.1982   -0.2150  -0.1808   -0.1737   -0.1719   -0.2333
 90    -0.5600   -0.5920   -0.5130   -0.5930   -0.5674   -0.6030   -0.5774   -0.6021   -0.5938   -0.5886   -0.5839   -0.5673   -0.5700   -0.5885   -0.5696  -0.5961   -0.6158   -0.5951   -0.5634
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                     </tableData>
                </table>
            </product>
        </function>

        <function name="aero/coefficient/delta-Cm_lef">
            <description>
               Cm due to leading edge flaps coefficient.
            </description>
            <product>
                <property>aero/qbar-psf</property>
                <property>metrics/Sw-sqft</property>
                <property>metrics/cbarw-ft</property>
                <property>fcs/lef-pos-r-norm</property>
                <difference>
                    <table name="Cm_lef">
                        <independentVar lookup="row">aero/alpha-deg</independentVar>
                        <independentVar lookup="column">aero/beta-deg</independentVar>
                        <tableData>
       -30    -25    -20    -15    -10     -8     -6     -4     -2      0      2      4      6      8     10     15     20     25     30
-20 0.0922 0.0559 0.0525 -.0338 -.0518 -.0605 -.0574 -.0554 -.0550 -.0503 -.0521 -.0483 -.0459 -.0404 -.0373 -.0193 0.0670 0.0704 0.1067
-05 -.0006 -.0193 -.0234 -.0321 -.0376 -.0389 -.0385 -.0386 -.0388 -.0387 -.0389 -.0387 -.0388 -.0392 -.0386 -.0321 -.0234 -.0193 -.0006
 10 -.0446 -.0368 -.0266 -.0166 -.0127 -.0113 -.0092 -.0057 -.0033 -.0016 -.0017 -.0025 -.0038 -.0049 -.0085 -.0124 -.0224 -.0326 -.0404
 25 -.1090 -.1235 -.0938 -.0777 -.0674 -.0648 -.1607 -.0558 -.0526 -.0455 -.0471 -.0479 -.0530 -.0563 -.0610 -.0713 -.0874 -.1171 -.1026
 40 -.0116 -.0639 -.0971 -.1156 -.1170 -.1142 -.1182 -.1160 -.1178 -.1206 -.1280 -.1347 -.1436 -.1512 -.1516 -.1502 -.1317 -.0985 -.0462
 45 -.0023 -.0164 -.0417 -.0987 -.0985 -.0975 -.1278 -.1042 -.1156 -.0979 -.1122 -.1225 -.1444 -.1340 -.1461 -.1463 -.0893 -.0640 -.0499
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                         </tableData>
                    </table>
                    <table name="Cm_dh0">
                        <independentVar lookup="row">aero/alpha-deg</independentVar>
                        <independentVar lookup="column">aero/beta-deg</independentVar>
                        <tableData>
       -30    -25    -20    -15    -10     -8     -6     -4     -2      0      2      4      6      8     10     15     20     25     30
-20 0.0978 0.0719 0.0621 0.0430 0.0054 0.0023 0.0006 0.0062 0.0114 0.0127 0.0001 0.0023 0.0006 0.0033 0.0177 0.0550 0.0740 0.0840 0.1100
 00 -.0550 -.0460 -.0590 -.0640 -.0660 -.0660 -.0639 -.0615 -.0605 -.0598 -.0600 -.0606 -.0608 -.0617 -.0621 -.0606 -.0587 -.0484 -.0517
 20 -.0570 -.0710 -.0620 -.0520 -.0478 -.0518 -.0498 -.0463 -.0384 -.0342 -.0329 -.0366 -.0426 -.0532 -.0555 -.0620 -.0705 -.0800 -.0660
 40 0.0450 0.0050 -.0520 -.0610 -.0662 -.0729 -.0739 -.0789 -.0820 -.0835 -.0917 -.0971 -.1252 -.1071 -.1116 -.1057 -.0979 -.0402 0.0022
 60 -.1830 -.1480 -.1730 -.1720 -.1512 -.1428 -.1118 -.1094 -.1266 -.1414 -.1436 -.1437 -.1521 -.1459 -.1530 -.1709 -.1741 -.1475 -.1841
 90 -.6330 -.6300 -.6160 -.6160 -.6067 -.6366 -.6053 -.6281 -.6217 -.6184 -.6163 -.6022 -.6073 -.6281 -.6115 -.6209 -.6210 -.6351 -.6381
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                        </tableData>
                    </table>
                </difference>
            </product>
        </function>

        <function name="aero/coefficient/Cm_sb">
            <description>
               Cm due speed brake coefficient.
            </description>
            <product>
                <property>aero/qbar-psf</property>
                <property>metrics/Sw-sqft</property>
                <property>metrics/cbarw-ft</property>
                <property>fcs/speedbrake-pos-norm</property>
                <table>
                    <independentVar lookup="row">aero/alpha-deg</independentVar>
                    <tableData>
-20 -.0034
-15 -.0034
 00 -.0034
 15 0.0122
 30 -.0163
 45 -.0844
 60 -.0450
 90 -.0107
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                     </tableData>
                </table>
            </product>
        </function>

        <function name="aero/coefficient/Cm_alpha">
            <description>
               Cm due to alpha coefficient.
            </description>
            <product>
                <property>aero/qbar-psf</property>
                <property>metrics/Sw-sqft</property>
                <property>metrics/cbarw-ft</property>
                <table>
                    <independentVar lookup="row">aero/alpha-deg</independentVar>
                    <tableData>
-20 .019
-15 .019
 00 .019
 15 .04
 30 .06
 45 .06
 60 .06
 90 .06
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                     </tableData>
                </table>
            </product>
        </function>

        <function name="aero/coefficient/Cm_q">
            <description>
               Cm due to pitch rate coefficient.
            </description>
            <product>
                <property>aero/qbar-psf</property>
                <property>metrics/Sw-sqft</property>
                <property>metrics/cbarw-ft</property>
                <property>aero/ci2vel</property>
                <property>velocities/q-rad_sec</property>
                <table>
                    <independentVar lookup="row">aero/alpha-deg</independentVar>
                    <tableData>
-20 -6.84
-15 -6.84
 00 -5.48
 15 -6.70
 30 -6.20
 45 -6.00
 60 -4.50
 90 -4.04
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                    </tableData>
                </table>
            </product>
        </function>

        <function name="aero/coefficient/Cm_q-lef">
            <description>
               Cm due to pitch rate due to leading edge flaps coefficient.
            </description>
            <product>
                <property>aero/qbar-psf</property>
                <property>metrics/Sw-sqft</property>
                <property>metrics/cbarw-ft</property>
                <property>aero/ci2vel</property>
                <property>velocities/q-rad_sec</property>
                <property>fcs/lef-pos-r-norm</property>
                <table>
                    <independentVar lookup="row">aero/alpha-deg</independentVar>
                    <tableData>
-20 -.367
-15 -.367
-05 2.88
 05 .27
 15 .36
 25 -2.51
 35 -1.72
 45 -.60
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                     </tableData>
                </table>
            </product>
        </function>

        <function name="aero/coefficient/Cm_ds">
            <description>
               Cm due to deep stall coefficient
            </description>
            <product>
                <property>aero/qbar-psf</property>
                <property>metrics/Sw-sqft</property>
                <property>metrics/cbarw-ft</property>
                <table>
                    <independentVar lookup="row">aero/alpha-deg</independentVar>
                    <independentVar lookup="column">fcs/elevator-pos-deg</independentVar>
                    <tableData>
        -25     -10       0      10      15      20      25
 30 0.00000 0.00000 0.00000 0.00000 0.00000 0.00000 0.00000
 35 0.00000 0.00000 0.00000 0.00000 -.01130 -.01320 0.00000
 40 0.00000 0.01000 0.01000 0.02000 0.00410 0.02970 0.02540
 45 0.04800 0.05700 0.06400 0.07000 0.07060 0.05060 0.04070
 50 0.03900 0.05400 0.10500 0.07500 0.07920 0.07470 0.08220
 55 0.00000 0.02500 0.07500 0.04000 0.04160 0.05000 0.05830
 60 0.08400 0.08000 0.10600 0.10000 0.08860 0.07760 0.07850
 70 0.09900 0.07500 0.13200 0.02000 0.02875 0.03610 0.04680
 80 0.02000 0.01000 0.05000 0.00000 0.02180 -.02510 -.02100
 90 0.00000 0.01000 0.04000 0.00000 -.03445 -.03780 -.03780
                    </tableData>
                </table>
            </product>
        </function>

    </axis>


    <function name="aero/coefficient/Cy">
        <description>
           Cy coefficient
        </description>
        <table>
            <independentVar lookup="row">aero/alpha-deg</independentVar>
            <independentVar lookup="column">aero/beta-deg</independentVar>
            <tableData>
       -30    -25    -20    -15    -10     -8     -6     -4     -2      0      2      4      6      8     10     15     20     25     30
-20 0.3677  0.307 0.246 0.1844  0.1062  0.085 0.0677  0.038 0.0186  0 -0.0232 -0.0467 -0.0747 -0.1078 -0.1421 -0.2221 -0.2861 -0.3461 -0.4081
 00 0.6218  0.5258  0.4208  0.3088  0.2014  0.1553  0.1138  0.0726  0.0371  0 -0.0394 -0.0764 -0.1191 -0.1674 -0.2134 -0.3198 -0.4315 -0.5369 -0.64
 20 0.5783  0.4633  0.3383  0.2563  0.1814  0.1504  0.1116  0.0703  0.0332  0 -0.0248 -0.0558 -0.0984 -0.1366 -0.1729 -0.2479 -0.328  -0.4542 -0.5698
 40 0.447 0.3885  0.3025  0.2135  0.0748  0.0531  0.0303  0.036 0.0123  0 -0.032  -0.0484 -0.0664 -0.0958 -0.1075 -0.1539 -0.1575 -0.1807 -0.2242
 60 0.2233  0.1713  0.2083  0.1883  0.123 0.1051  0.0788  0.0546  0.0474  0 -0.0048 -0.0571 -0.084  -0.1047 -0.1242 -0.1885 -0.2077 -0.1719 -0.2099
 90 0.3078  0.2498  0.1998  0.1568  0.1089  0.0843  0.0658  0.0446  0.0203  0 -0.0263 -0.0418 -0.0611 -0.0836 -0.1068 -0.1547 -0.1986 -0.2474 -0.3047
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            </tableData>
        </table>
    </function>

    <function name="aero/coefficient/Cy_rudder">
        <description>
           Cy due to rudder coefficient
        </description>
        <table>
            <independentVar lookup="row">aero/alpha-deg</independentVar>
            <independentVar lookup="column">aero/beta-deg</independentVar>
            <tableData note="Numbers in this table typed in by E.V.Oort and L.Sonneveldt">
       -30    -25    -20    -15    -10     -8     -6     -4     -2      0      2      4      6      8     10     15     20     25     30
-20 0.4196    0.3510    0.2977    0.2414    0.1906    0.1827    0.1760    0.1446    0.1264    0.0945    0.0772    0.0538    0.0320   -0.0018   -0.0465  -0.0970   -0.1530   -0.2050   -0.2730
 00     0.6350    0.5660    0.4960    0.3800    0.2698    0.2407    0.1979    0.1572    0.1202    0.0821    0.0492    0.0147   -0.0297   -0.0788   -0.1309  -0.2407   -0.3564   -0.4250   -0.4950
 20     0.6550    0.5430    0.4380    0.3490    0.2371    0.2163    0.1941    0.1455    0.1181    0.0783    0.0473    0.0199   -0.0179   -0.0538   -0.0913  -0.2012   -0.2911   -0.4010   -0.5100
 40     0.1520    0.1620    0.1190    0.0910    0.0369    0.0042    0.0064   -0.0024   -0.0064   -0.0096   -0.0377   -0.0541   -0.0850   -0.1087   -0.1438  -0.1967   -0.2260   -0.2711   -0.2624
 60     0.1760    0.1410    0.1750    0.1460    0.0952    0.0644    0.0423    0.0019   -0.0112   -0.0357   -0.0464   -0.0974   -0.1185   -0.1145   -0.1705  -0.2213   -0.2515   -0.2160   -0.2518
 90     0.3000    0.2410    0.1910    0.1580    0.1054    0.0784    0.0628    0.0482    0.0252    0.0064   -0.0112   -0.0323   -0.0634   -0.0829   -0.1004  -0.1527   -0.1861   -0.2362   -0.2997
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            </tableData>
        </table>
    </function>

    <function name="aero/coefficient/Cy_lef">
        <description>
           Cy due to rudder coefficient
        </description>
        <table>
            <independentVar lookup="row">aero/alpha-deg</independentVar>
            <independentVar lookup="column">aero/beta-deg</independentVar>
            <tableData note="Numbers in this table typed in by E.V.Oort and L.Sonneveldt">
       -30    -25    -20    -15    -10     -8     -6     -4     -2      0      2      4      6      8     10     15     20     25     30
-20 0.3692  0.2991  0.2417  0.1692  0.1078  0.0874  0.0837  0.0572  0.026 0 -0.0258 -0.0592 -0.0863 -0.1209 -0.1504 -0.2106 -0.2836 -0.3396 -0.4106
-10 0.5 0.4441  0.3671  0.2896  0.1871  0.1475  0.1096  0.0757  0.0377  0 -0.0339 -0.0708 -0.1108 -0.1513 -0.1949 -0.2978 -0.3758 -0.4528 -0.5078
 00 0.6293  0.5313  0.4173  0.3053  0.2024  0.1582  0.1116  0.0729  0.0374  0 -0.0374 -0.0776 -0.1223 -0.1712 -0.2158 -0.3196 -0.4308 -0.5443 -0.6426
 10 0.6132  0.5192  0.4302  0.3142  0.208 0.1631  0.1187  0.0784  0.037 0 -0.0378 -0.0774 -0.1228 -0.1664 -0.2153 -0.3196 -0.4353 -0.5237 -0.6177
 20 0.475 0.375 0.295 0.23  0.1576  0.1254  0.0919  0.059 0.0282  0 -0.0313 -0.067  -0.1023 -0.1374 -0.171  -0.2452 -0.3089 -0.3869 -0.488
 30 0.3436  0.3226  0.2286  0.1396  0.0825  0.0801  0.0757  0.0549  0.0287  0 -0.0289 -0.0527 -0.0724 -0.0939 -0.1136 -0.1694 -0.2589 -0.3511 -0.3742
 40 0.1976  0.1776  0.1566  0.1286  0.0906  0.0737  0.0593  0.0505  0.0188  0 -0.0286 -0.0516 -0.0737 -0.0938 -0.1132 -0.1503 -0.1791 -0.1996 -0.2195
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 45 0.1741  0.1251  0.1201  0.132 0.111 0.0854  0.055 0.0339  0.0183  0 -0.0544 -0.0929 -0.1312 -0.1581 -0.1766 -0.1977 -0.1859 -0.19 -0.2385]
            </tableData>
        </table>
    </function>

    <function name="aero/coefficient/Cy_a">
        <description>
           Cy due to aileron coefficient
        </description>
        <table>
            <independentVar lookup="row">aero/alpha-deg</independentVar>
            <independentVar lookup="column">aero/beta-deg</independentVar>
            <tableData note="Numbers in this table typed in by E.V.Oort and L.Sonneveldt">
       -30    -25    -20    -15    -10     -8     -6     -4     -2      0      2      4      6      8     10     15     20     25     30
-20 0.3838    0.3204    0.2946    0.2275    0.1467    0.1200    0.1010    0.0717    0.0500    0.0281    0.0028   -0.0154   -0.0412   -0.0694   -0.0949  -0.1760   -0.2440   -0.2700   -0.3340
 00     0.6590    0.5630    0.4490    0.3300    0.2130    0.1799    0.1390    0.0963    0.0573    0.0197   -0.0166   -0.0528   -0.0957   -0.1350   -0.1821  -0.3000   -0.4190   -0.5326   -0.6294
 20     0.5720    0.4820    0.3860    0.2980    0.1930    0.1520    0.1166    0.0750    0.0327    0.0028   -0.0200   -0.0510   -0.0889   -0.1273   -0.1667  -0.2716   -0.3586   -0.4536   -0.5415
 40     0.0967    0.0825    0.0349    0.0078   -0.0310   -0.0492   -0.0576   -0.0533   -0.0696   -0.0840   -0.1036   -0.1271   -0.1460   -0.1763   -0.1919  -0.2328   -0.2557   -0.3029   -0.3183
 60     0.1232    0.1021    0.1151    0.0882    0.0311    0.0001   -0.0094   -0.0503   -0.0647   -0.0920   -0.0976   -0.1289   -0.1540   -0.1714   -0.1950  -0.2546   -0.2846   -0.2656   -0.2868
 90     0.2845    0.2302    0.1800    0.1510    0.0998    0.0777    0.0577    0.0351    0.0111   -0.0048   -0.0320   -0.0476   -0.0770   -0.0989   -0.1204 -0.1735   -0.2153   -0.2572   -0.3173
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            </tableData>
        </table>
    </function>

    <function name="aero/coefficient/Cy_a-lef">
        <description>
           Cy due to aileron and leading edge flaps coefficient
        </description>
        <table>
            <independentVar lookup="row">aero/alpha-deg</independentVar>
            <independentVar lookup="column">aero/beta-deg</independentVar>
            <tableData note="Numbers in this table typed in by E.V.Oort and L.Sonneveldt">
       -30    -25    -20    -15    -10     -8     -6     -4     -2      0      2      4      6      8     10     15     20     25     30
-20 0.3860    0.3207    0.2777    0.1838    0.1290    0.1215    0.1051    0.0758    0.0498    0.0247   -0.0067   -0.0334   -0.0645   -0.0939   -0.1248  -0.1790   -0.2730   -0.3160   -0.3810
-05     0.6320    0.5470    0.4410    0.3320    0.2109    0.1775    0.1379    0.0940    0.0585    0.0202   -0.0132   -0.0538   -0.0901   -0.1326   -0.1786  -0.2971   -0.4064   -0.5121   -0.5958
 10     0.6450    0.5620    0.4580    0.3360    0.2190    0.1828    0.1381    0.0955    0.0562    0.0164   -0.0231   -0.0582   -0.1041   -0.1462   -0.1962  -0.3136   -0.4322   -0.5393   -0.6208
 25     0.4920    0.3630    0.2720    0.1810    0.1246    0.1206    0.0935    0.0676    0.0338    0.0010   -0.0261   -0.0531   -0.0801   -0.1061   -0.1274  -0.1823   -0.2714   -0.3631   -0.4930
 40     0.1320    0.0870    0.0740    0.0500    0.0012   -0.0165   -0.0197   -0.0465   -0.0602   -0.0807   -0.1014   -0.1290   -0.1431   -0.1644   -0.1864  -0.2334   -0.2568   -0.2685   -0.3138
 45     0.1020    0.0520    0.0690    0.0650    0.0456    0.0212    0.0018   -0.0260   -0.0392   -0.0611   -0.1056   -0.1607   -0.1729   -0.1961   -0.2268  -0.2456   -0.2495   -0.2313   -0.2828
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            </tableData>
        </table>
    </function>

    <axis name="Y">

        <function name="aero/coefficient/Cy-lbf">
            <description>
               Cy coefficient
            </description>
            <product>
                <property>aero/qbar-psf</property>
                <property>metrics/Sw-sqft</property>
                <p>aero/coefficient/Cy</p>
            </product>
        </function>

        <function name="aero/coefficient/dCy_lef">
            <description>
               Cy due to leading edge flaps coefficient.
            </description>
            <product>
                <property>aero/qbar-psf</property>
                <property>metrics/Sw-sqft</property>
                <property>fcs/lef-pos-r-norm</property>
                <difference>
                    <p>aero/coefficient/Cy_lef</p>
                    <p>aero/coefficient/Cy</p>
                </difference>
            </product>
        </function>

        <function name="aero/coefficient/dCy_a-lef">
            <description>
               Cy due to aileron due to leading edge flaps coefficient
            </description>
            <product>
                <property>aero/qbar-psf</property>
                <property>metrics/Sw-sqft</property>
                <p>fcs/aileron-pos-norm</p><!-- 1 = 20 degs (should it rely on absolute norm instead? [maybe]) -->
                <sum>
                    <difference>
                        <p>aero/coefficient/Cy_a</p>
                        <p>aero/coefficient/Cy</p>
                    </difference>
                    <product>
                        <p>fcs/lef-pos-r-norm</p>
                        <difference>
                            <p>aero/coefficient/Cy_a-lef</p>
                            <p>aero/coefficient/Cy_lef</p>
                            <difference>
                                <p>aero/coefficient/Cy_a</p>
                                <p>aero/coefficient/Cy</p>
                            </difference>
                        </difference>
                    </product>
                </sum>
            </product>
        </function>

        <function name="aero/coefficient/dCy_dr">
            <description>
               Cy due to rudder coefficient
            </description>
            <product>
                <property>aero/qbar-psf</property>
                <property>metrics/Sw-sqft</property>
                <p>fcs/rudder-pos-norm</p><!-- 1 = 30 degs (should it rely on absolute norm instead? [probably]) -->
                <difference>
                    <p>aero/coefficient/Cy_rudder</p>
                    <p>aero/coefficient/Cy</p>
                </difference>
            </product>
        </function>

        <function name="aero/coefficient/Cy_r">
            <description>
               Cy due to yaw rate coefficient.
            </description>
            <product>
                <property>aero/qbar-psf</property>
                <property>metrics/Sw-sqft</property>
                <property>aero/bi2vel</property>
                <property>velocities/r-rad_sec</property>
                <table>
                    <independentVar lookup="row">aero/alpha-deg</independentVar>
                    <tableData>
-20 1.44
-15 1.44
 00 .981
 15 .981
 30 .590
 45 -1.04
 60 -1.37
 90 .193
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                     </tableData>
                </table>
            </product>
        </function>

        <function name="aero/coefficient/delta-Cy_r-lef">
            <description>
               Cy due to yaw rate due to leading edge flaps coefficient.
            </description>
            <product>
                <property>aero/qbar-psf</property>
                <property>metrics/Sw-sqft</property>
                <property>aero/bi2vel</property>
                <property>velocities/r-rad_sec</property>
                <property>fcs/lef-pos-r-norm</property>
                <table>
                    <independentVar lookup="row">aero/alpha-deg</independentVar>
                    <tableData>
-20 -.558
-15 -.558
-05 -.198
 05 .027
 15 -.046
 25 .215
 35 -.060
 45 -.187
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                     </tableData>
                </table>
            </product>
        </function>

        <function name="aero/coefficient/Cy_p">
            <description>
               Cy due to roll rate coefficient.
            </description>
            <product>
                <property>aero/qbar-psf</property>
                <property>metrics/Sw-sqft</property>
                <property>aero/bi2vel</property>
                <property>velocities/p-rad_sec</property>
                <table>
                    <independentVar lookup="row">aero/alpha-deg</independentVar>
                    <tableData>
-20 .0333
-15 .0333
 00 .0055
 15 .234
 30 .611
 45 -2.27
 60 2.90
 90 -.261
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                    </tableData>
                </table>
            </product>
        </function>

        <function name="aero/coefficient/delta-Cy_p-lef">
            <description>
               Cy due to roll rate due to leading edge flaps coefficient.
            </description>
            <product>
                <property>aero/qbar-psf</property>
                <property>metrics/Sw-sqft</property>
                <property>aero/bi2vel</property>
                <property>velocities/p-rad_sec</property>
                <property>fcs/lef-pos-r-norm</property>
                <table>
                    <independentVar lookup="row">aero/alpha-deg</independentVar>
                    <tableData>
-20 -.141
-15 -.141
-05 .069
 05 .0601
 15 -.052
 25 .106
 35 -.642
 45 -.128
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                     </tableData>
                </table>
            </product>
        </function>

    </axis>
    <function name="aero/coefficient/Cn_dh0">
        <description>
            coefficient
        </description>
            <table>
                    <independentVar lookup="row">aero/alpha-deg</independentVar>
                    <independentVar lookup="column">aero/beta-deg</independentVar>
                    <tableData note="Numbers in this table typed in by E.V.Oort and L.Sonneveldt">
       -30    -25    -20    -15    -10     -8     -6     -4     -2      0      2      4      6      8     10     15     20     25     30
-20 -0.05510 -0.05880  -0.04960  -0.04060  -0.02190  -0.01450  -0.00750  -0.00120  0.00020 0.00000 -0.00900  0.00120 0.00590 0.00990 0.01410 0.03330 0.04250 0.05160 0.04770
 00     -0.10580  -0.09160  -0.07490  -0.05780  -0.04130  -0.03170  -0.02260  -0.01380  -0.00660  0.00000 0.00610 0.01350 0.02250 0.03240 0.04140 0.05790 0.07460 0.09140 0.10550
 20     -0.06840  -0.04910  -0.02900  -0.03210  -0.03080  -0.02620  -0.01790  -0.01020  -0.00420  0.00000 0.00180 0.00680 0.01520 0.02330 0.02960 0.03090 0.02790 0.04790 0.06740
 40     -0.00250  0.00540 0.06830 0.07440 0.05060 0.03510 0.02070 0.01310 0.00520 0.00000 -0.00710  -0.01360  -0.02160  -0.03290  -0.04400  -0.06770  -0.06220  0.00120 0.02020
 60     -0.01880  -0.00750  0.02110 0.00800 -0.00610  -0.01000  -0.01740  -0.02190  -0.00790  0.00000 0.00750 0.01030 0.00430 -0.00130  -0.00190  -0.01560  -0.02840  0.00040 0.01100
 90     0.02740 0.01280 0.01180 0.00590 0.00510 0.00440 0.00310 0.00270 0.00170 0.00000 -0.00180  -0.00230  -0.00310  -0.00480  -0.00480  -0.00540  -0.01110  -0.01210  -0.01630
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                     </tableData>
                </table>
    </function>

    <function name="aero/coefficient/Cn_lef">
        <description>
            coefficient
        </description>
                <table>
                    <independentVar lookup="row">aero/alpha-deg</independentVar>
                    <independentVar lookup="column">aero/beta-deg</independentVar>
                    <tableData note="Numbers in this table typed in by E.V.Oort and L.Sonneveldt">
       -30    -25    -20    -15    -10     -8     -6     -4     -2      0      2      4      6      8     10     15     20     25     30
-20 -0.05410  -0.05630  -0.04610  -0.04950  -0.02960  -0.02080  -0.01730  -0.01000  -0.00430  0.00000 0.00370 0.00760 0.01210 0.01860 0.02310 0.04280 0.03930 0.04940 0.04680
-05     -0.08810  -0.08510  -0.07530  -0.05560  -0.04020  -0.03080  -0.02540  -0.01410  -0.00670  0.00000 0.00670 0.01440 0.02340 0.03280 0.04300 0.05860 0.07850 0.08720 0.09130
 10     -0.09260  -0.07970  -0.07310  -0.05800  -0.04240  -0.03270  -0.02350  -0.01540  -0.00640  0.00000 0.00640 0.01150 0.02430 0.03300 0.04250 0.05790 0.07300 0.07960 0.09250
 25     -0.03420  -0.02080  -0.00170  0.00630 -0.00590  -0.00940  -0.00610  -0.00290  -0.00120  0.00000 0.00080 0.00380 0.00690 0.00780 0.00340 -0.00880  -0.00080  0.01830 0.03170
 40     0.03020 0.03570 0.06750 0.06450 0.04450 0.03300 0.02140 0.01560 0.00650 0.00000 -0.00600  -0.01360  -0.01550  -0.02660  -0.03300  -0.05320  -0.05610  -0.02400  0.00140
 45     0.00030 -0.00380  0.02140 0.04000 0.03260 0.02610 0.01990 0.01300 0.00470 0.00000 -0.01700  -0.03690  -0.04640  -0.05330  -0.06110  -0.06810  -0.04950  -0.02450  -0.02800
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                     </tableData>
                </table>
    </function>

    <function name="aero/coefficient/Cn_a">
        <description>
            coefficient
        </description>
                <table>
                    <independentVar lookup="row">aero/alpha-deg</independentVar>
                    <independentVar lookup="column">aero/beta-deg</independentVar>
                    <tableData note="Numbers in this table typed in by E.V.Oort and L.Sonneveldt">
       -30    -25    -20    -15    -10     -8     -6     -4     -2      0      2      4      6      8     10     15     20     25     30
-20 -0.06390 -0.06280  -0.06160  -0.05500  -0.03590  -0.02670  -0.01880  -0.01190  -0.00930  -0.00890  -0.00810  -0.00710  -0.00430  -0.00400  0.00200 0.02110 0.02770 0.02890 0.03000
 00     -0.12340  -0.10940  -0.09150  -0.07210  -0.04980  -0.04480  -0.03770  -0.02770  -0.01930  -0.01200  -0.00560  0.00150 0.00920 0.01750 0.02680 0.04910 0.06850 0.08640 0.10040
 20     -0.06700  -0.05610  -0.05050  -0.04720  -0.03580  -0.02690  -0.01980  -0.01110  -0.00290  -0.00010  0.00150 0.00520 0.01210 0.02040 0.02730 0.03870 0.04200 0.04760 0.05850
 40     0.00560 0.03220 0.08310 0.08810 0.05630 0.03950 0.02710 0.01870 0.01270 0.00440 -0.00090  -0.00600  -0.01310  -0.02240  -0.03280  -0.06460  -0.05780  -0.00870  0.01790
 60     0.00470 -0.00080  0.02810 0.02570 0.01650 0.01690 0.01150 0.00920 0.02070 0.01820 0.02360 0.01950 0.01580 0.01120 0.00390 -0.00530  -0.00770  0.02120 0.01570
 90     0.03200 0.02870 0.02370 0.01650 0.01650 0.01530 0.01510 0.01550 0.01380 0.01250 0.01130 0.01100 0.01010 0.01010 0.01170 0.01170 0.00450 -0.00500  -0.00380
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                    </tableData>
                </table>
    </function>

    <function name="aero/coefficient/Cn_a-lef">
        <description>
            coefficient
        </description>
                <table>
                    <independentVar lookup="row">aero/alpha-deg</independentVar>
                    <independentVar lookup="column">aero/beta-deg</independentVar>
                    <tableData note="Numbers in this table typed in by E.V.Oort and L.Sonneveldt">
       -30    -25    -20    -15    -10     -8     -6     -4     -2      0      2      4      6      8     10     15     20     25     30
-20 -0.06830  -0.06150  -0.05560  -0.05190  -0.03930  -0.03140  -0.02640  -0.01990  -0.01400  -0.00950  -0.00540  -0.00290  0.00190 0.00740 0.01240 0.02510 0.02930 0.03540 0.04210
-05     -0.11490  -0.10670  -0.08980  -0.07160  -0.04820  -0.04290  -0.03590  -0.02670  -0.01880  -0.01130  -0.00500  0.00240 0.00930 0.01860 0.02780 0.05110 0.06890 0.08560 0.09320
 10     -0.10240  -0.09440  -0.08270  -0.06580  -0.04500  -0.04010  -0.03070  -0.02240  -0.01370  -0.00560  0.00150 0.00790 0.01640 0.02510 0.03450 0.05500 0.07190 0.08380 0.09170
 25     -0.03700  -0.01630  -0.00250  0.00280 -0.00870  -0.01050  -0.00710  -0.00490  -0.00190  -0.00060  0.00040 0.00240 0.00410 0.00550 0.00150 -0.00980  -0.00500  0.00890 0.03070
 40     0.01890 0.04630 0.08030 0.07860 0.05190 0.03920 0.02870 0.02090 0.01270 0.00620 -0.00170  -0.00790  -0.01050  -0.01610  -0.02210  -0.04860  -0.04970  -0.01550  0.01160
 45     0.00550 0.00450 0.02240 0.04320 0.04190 0.00355 0.02740 0.02020 0.01410 0.00690 -0.01050  -0.03210  -0.03750  -0.04680  -0.05360  -0.05490  -0.03440  -0.01640  -0.01740
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                     </tableData>
                </table>
    </function>

    <function name="aero/coefficient/Cn_dr">
        <description>
            coefficient
        </description>
                <table>
                    <independentVar lookup="row">aero/alpha-deg</independentVar>
                    <independentVar lookup="column">aero/beta-deg</independentVar>
                    <tableData note="Numbers in this table typed in by E.V.Oort and L.Sonneveldt">
       -30    -25    -20    -15    -10     -8     -6     -4     -2      0      2      4      6      8     10     15     20     25     30
-20 -0.07870 -0.08150  -0.07410  -0.06560  -0.06200  -0.06270  -0.06160  -0.05510  -0.05200  -0.04810  -0.04940  -0.04860  -0.04650  -0.03960  -0.03100  -0.02700  -0.01910  -0.01130  -0.01430
 00     -0.15760  -0.13810  -0.11810  -0.09810  -0.07910  -0.07830  -0.06930  -0.06100  -0.05270  -0.04510  -0.03890  -0.03230  -0.02300  -0.01160  0.00000 0.01900 0.03890 0.05840 0.07840
 20     -0.12710  -0.10710  -0.08660  -0.08360  -0.06770  -0.06850  -0.06760  -0.06280  -0.05430  -0.04750  -0.04310  -0.04040  -0.03210  -0.02300  -0.00470  0.00120 0.00430 0.02490 0.04470
 40     -0.02890  -0.01110  0.03860 0.04840 0.03210 0.01450 0.00130 -0.01030  -0.02430  -0.00328  -0.04050  -0.04490  -0.04960  -0.05700  -0.06590  -0.08240  -0.07260  -0.02270  -0.00530
 60     -0.01620  -0.01270  0.01810 0.00260 -0.00840  -0.01210  -0.01950  -0.01930  -0.00820  -0.00120  0.00660 0.00960 0.00460 -0.00330  -0.00480  -0.01630  -0.03170  -0.00120  0.00260
 90     0.00890 0.00770 0.00680 0.00140 -0.00360  -0.00440  -0.00570  -0.00100  -0.00090  -0.00240  -0.00420  -0.00470  -0.00540  -0.00580  -0.00570  -0.01090  -0.01570  -0.01700  -0.01810
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                    </tableData>
                </table>
    </function>

    <axis name="YAW">

        <function name="aero/coefficient/Cn">
            <description>
               Cn coefficient
            </description>
            <product>
                <property>aero/qbar-psf</property>
                <property>metrics/Sw-sqft</property>
                <property>metrics/bw-ft</property>
                <table>
                    <independentVar lookup="row">aero/alpha-deg</independentVar>
                    <independentVar lookup="column">aero/beta-deg</independentVar>
                    <independentVar lookup="table">fcs/elevator-pos-deg</independentVar>
                    <tableData breakPoint="-25.0" note="Numbers in this table typed in by E.V.Oort and L.Sonneveldt">
       -30    -25    -20    -15    -10     -8     -6     -4     -2      0      2      4      6      8     10     15     20     25     30
-20 -0.06330 -0.06670  -0.05650  -0.04180  -0.01750  -0.00930  -0.00600  0.00470 0.00340 0.00000 -0.00480  -0.01060  -0.00740  -0.00150  0.00520 0.02970 0.04430 0.05450 0.05100
 00     -0.09950  -0.08690  -0.07950  -0.05280  -0.03750  -0.02800  -0.01930  -0.01180  -0.00530  0.00000 0.00550 0.01220 0.02080 0.03020 0.03930 0.05470 0.07060 0.08910 0.10340
 20     -0.06770  -0.05060  -0.02900  -0.02760  -0.02590  -0.02160  -0.01510  -0.00880  -0.00400  0.00000 -0.00220  0.00210 0.00990 0.01610 0.02100 0.02260 0.02410 0.04600 0.06270
 40     -0.00370  0.01670 0.07700 0.08030 0.05730 0.04330 0.02920 0.01840 0.00680 0.00000 -0.00480  -0.01150  -0.02330  -0.03320  -0.04920  -0.07620  -0.07270  -0.01250  0.00790
 60     -0.00550  0.00680 0.03740 0.01190 0.02340 0.01270 -0.00160  -0.01200  -0.00290  0.00000 0.00520 0.00570 -0.01010  -0.02150  -0.02210  -0.02630  -0.03580  -0.00550  0.00660
 90     0.03190 0.01990 0.01080 0.00180 0.00790 0.00620 0.00390 0.00290 0.00180 0.00000 -0.00640  -0.00510  -0.00980  -0.00970  -0.01010  -0.00380  -0.00720  -0.01590  -0.02770
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                    </tableData>
                    <tableData breakPoint="0.0" note="Numbers in this table typed in by E.V.Oort and L.Sonneveldt">
       -30    -25    -20    -15    -10     -8     -6     -4     -2      0      2      4      6      8     10     15     20     25     30
-20 -0.05510 -0.05880  -0.04960  -0.04060  -0.02190  -0.01450  -0.00750  -0.00120  0.00020 0.00000 -0.00900  0.00120 0.00590 0.00990 0.01410 0.03330 0.04250 0.05160 0.04770
 00     -0.10580  -0.09160  -0.07490  -0.05780  -0.04130  -0.03170  -0.02260  -0.01380  -0.00660  0.00000 0.00610 0.01350 0.02250 0.03240 0.04140 0.05790 0.07460 0.09140 0.10550
 20     -0.06840  -0.04910  -0.02900  -0.03210  -0.03080  -0.02620  -0.01790  -0.01020  -0.00420  0.00000 0.00180 0.00680 0.01520 0.02330 0.02960 0.03090 0.02790 0.04790 0.06740
 40     -0.00250  0.00540 0.06830 0.07440 0.05060 0.03510 0.02070 0.01310 0.00520 0.00000 -0.00710  -0.01360  -0.02160  -0.03290  -0.04400  -0.06770  -0.06220  0.00120 0.02020
 60     -0.01880  -0.00750  0.02110 0.00800 -0.00610  -0.01000  -0.01740  -0.02190  -0.00790  0.00000 0.00750 0.01030 0.00430 -0.00130  -0.00190  -0.01560  -0.02840  0.00040 0.01100
 90     0.02740 0.01280 0.01180 0.00590 0.00510 0.00440 0.00310 0.00270 0.00170 0.00000 -0.00180  -0.00230  -0.00310  -0.00480  -0.00480  -0.00540  -0.01110  -0.01210  -0.01630
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                    </tableData>
                    <tableData breakPoint="25.0" note="Numbers in this table typed in by E.V.Oort and L.Sonneveldt">
       -30    -25    -20    -15    -10     -8     -6     -4     -2      0      2      4      6      8     10     15     20     25     30
-20 -0.04880 -0.05150  -0.04420  -0.04280  -0.02150  -0.01360  -0.00460  -0.00180  0.00010 0.00000 -0.00050  -0.00030  0.00480 0.00840 0.01430 0.03560 0.03690 0.04410 0.04250
 00     -0.09190  -0.08180  -0.06940  -0.05600  -0.04020  -0.03110  -0.02230  -0.01410  -0.00650  0.00000 0.00690 0.01470 0.02300 0.03190 0.04080 0.05650 0.06960 0.08240 0.09240
 20     -0.03980  -0.03550  -0.02370  -0.02840  -0.03110  -0.02700  -0.01830  -0.00910  -0.00350  0.00000 0.00280 0.00520 0.01780 0.02680 0.03320 0.03050 0.02590 0.03740 0.04170
 40     0.00030 -0.01930  0.06980 0.07880 0.05340 0.03720 0.02520 0.01690 0.00730 0.00000 -0.00840  -0.01470  -0.02480  -0.03620  -0.04800  -0.07330  -0.06410  -0.00520  0.00510
 60     -0.02700  -0.02070  0.00420 -0.01370  -0.01370  -0.01380  -0.01730  -0.02030  -0.00710  0.00000 0.00930 0.01380 0.00670 -0.00280  -0.00730  -0.00720  -0.02540  -0.00080  0.00560
 90     0.01180 0.01010 0.01170 0.00360 0.00600 0.00530 0.00410 0.00350 0.00210 0.00000 -0.00020  0.00080 0.00080 -0.00080  -0.00080  0.00140 -0.00680  -0.00540  -0.00720
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                     </tableData>
                </table>
            </product>
        </function>

        <function name="aero/coefficient/dCn_lef">
            <description>
               Cn due to leading edge flaps coefficient.
            </description>
            <product>
                <property>aero/qbar-psf</property>
                <property>metrics/Sw-sqft</property>
                <property>metrics/bw-ft</property>
                <property>fcs/lef-pos-r-norm</property>
                <difference>
                    <p>aero/coefficient/Cn_lef</p>
                    <p>aero/coefficient/Cn_dh0</p>
                </difference>
            </product>
        </function>

        <function name="aero/coefficient/dCn_a-lef">
            <description>
               Cn due to aileron coefficient
            </description>
            <product>
                <property>aero/qbar-psf</property>
                <property>metrics/Sw-sqft</property>
                <property>metrics/bw-ft</property>
                <p>fcs/aileron-pos-norm</p><!-- 1 = 20 degs -->
                <sum>
                    <difference>
                        <p>aero/coefficient/Cn_a</p>
                        <p>aero/coefficient/Cn_dh0</p>
                    </difference>
                    <product>
                        <p>fcs/lef-pos-r-norm</p>
                        <difference>
                            <p>aero/coefficient/Cn_a-lef</p>
                            <p>aero/coefficient/Cn_lef</p>
                            <difference>
                                <p>aero/coefficient/Cn_a</p>
                                <p>aero/coefficient/Cn_dh0</p>
                            </difference>
                        </difference>
                    </product>
                </sum>
            </product>
        </function>

        <!--<function name="aero/coefficient/Cn_cg">
            <description>
               Cn due to CoG shift
            </description>
            <product>
                <property>aero/qbar-psf</property>
                <property>metrics/Sw-sqft</property>
                <property>metrics/bw-ft</property>
                <v>-1</v>
                <difference>
                    <v>-193</v>
                    <p>inertia/cg-x-in</p>
                </difference>
                <p>aero/coefficient/Cy_t</p> need to refactor some stuff to seperate this one out
                <quotient>
                    <property>metrics/cbarw-ft</property>
                    <property>metrics/bw-ft</property>
                <quotient>
            </product>
        </function>  -->

        <function name="aero/coefficient/dCn_dr">
            <description>
               Cn due to rudder coefficient
            </description>
            <product>
                <property>aero/qbar-psf</property>
                <property>metrics/Sw-sqft</property>
                <property>metrics/bw-ft</property>
                <p>fcs/rudder-pos-norm</p><!-- 1 = 30 degs -->
                <difference>
                    <p>aero/coefficient/Cn_dr</p>
                    <p>aero/coefficient/Cn_dh0</p>
                </difference>
            </product>
        </function>

        <function name="aero/coefficient/Cn_r">
            <description>
               Cn due to yaw rate coefficient.
            </description>
            <product>
                <property>aero/qbar-psf</property>
                <property>metrics/Sw-sqft</property>
                <property>metrics/bw-ft</property>
                <property>aero/bi2vel</property>
                <property>velocities/r-rad_sec</property>
                <table>
                    <independentVar lookup="row">aero/alpha-deg</independentVar>
                    <tableData>
-20 -.517
-15 -.517
 00 -.414
 15 -.455
 30 -.595
 45 -.84
 60 -.35
 90 -.15
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                     </tableData>
                </table>
            </product>
        </function>

        <function name="aero/coefficient/Cn_b">
            <description>
               Cn due to beta coefficient.
            </description>
            <product>
                <property>aero/qbar-psf</property>
                <property>metrics/Sw-sqft</property>
                <property>metrics/bw-ft</property>
                <property>aero/beta-rad</property>
                <table>
                    <independentVar lookup="row">aero/alpha-deg</independentVar>
                    <tableData>
-20 .0
-15 .0
 00 .0
 15 .0
 30 .001
 45 .0
 60 .0
 90 .0
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                    </tableData>
                </table>
            </product>
        </function>

        <function name="aero/coefficient/dCn_a">
            <description>
               Cn due to aileron coefficient.
            </description>
            <product>
                <property>aero/qbar-psf</property>
                <property>metrics/Sw-sqft</property>
                <property>metrics/bw-ft</property>
                <property>fcs/aileron-pos-rad</property>
                <table>
                    <independentVar lookup="row">aero/alpha-deg</independentVar>
                    <tableData>
-20 .0
-15 .0
 00 .0001
 15 .00010
 30 .0
 45 .0
 60 .0
 90 .0
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                     </tableData>
                </table>
            </product>
        </function>

        <function name="aero/coefficient/Cn_r-lef">
            <description>
               Cn due to yaw rate due to leading edge flaps coefficient.
            </description>
            <product>
                <property>aero/qbar-psf</property>
                <property>metrics/Sw-sqft</property>
                <property>metrics/bw-ft</property>
                <property>aero/bi2vel</property>
                <property>velocities/r-rad_sec</property>
                <property>fcs/lef-pos-r-norm</property>
                <table>
                    <independentVar lookup="row">aero/alpha-deg</independentVar>
                    <tableData>
-20 .137
-15 .137
-05 .098
 05 .016
 15 .014
 25 -.098
 35 -.437
 45 .084
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                     </tableData>
                </table>
            </product>
        </function>

        <function name="aero/coefficient/Cn_p">
            <description>
               Cn due to roll rate coefficient.
            </description>
            <product>
                <property>aero/qbar-psf</property>
                <property>metrics/Sw-sqft</property>
                <property>metrics/bw-ft</property>
                <property>aero/bi2vel</property>
                <property>velocities/p-rad_sec</property>
                <table>
                    <independentVar lookup="row">aero/alpha-deg</independentVar>
                    <tableData>
-20 -.0006
-15 -.0006
 00 -.0075
 15 -.0320
 30 .13
 45 .15
 60 -.3
 90 0.0
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                     </tableData>
                </table>
            </product>
        </function>

        <function name="aero/coefficient/Cn_p-lef">
            <description>
               Cn due to roll rate due to leading edge flaps coefficient.
            </description>
            <product>
                <property>aero/qbar-psf</property>
                <property>metrics/Sw-sqft</property>
                <property>metrics/bw-ft</property>
                <property>aero/bi2vel</property>
                <property>velocities/p-rad_sec</property>
                <property>fcs/lef-pos-r-norm</property>
                <table>
                    <independentVar lookup="row">aero/alpha-deg</independentVar>
                    <tableData>
-20 .0615
-15 .0615
-05 .0091
 05 .0129
 15 .0512
 25 .0017
 35 .211
 45 .196
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                     </tableData>
                </table>
            </product>
        </function>

    </axis>


    <function name="aero/coefficient/Cl_dh0">
        <description>
            coefficient
        </description>
                <table>
                    <independentVar lookup="row">aero/alpha-deg</independentVar>
                    <independentVar lookup="column">aero/beta-deg</independentVar>
                    <tableData note="Numbers in this table typed in by E.V.Oort and L.Sonneveldt">
       -30    -25    -20    -15    -10     -8     -6     -4     -2      0      2      4      6      8     10     15     20     25     30
-20 -0.0153  -0.0028 0.0091  0.0188  0.0234  0.0173  0.0106  0.009 0.0041  0 -0.0031 -0.0064 -0.0084 -0.0128 -0.0171 -0.012  -0.0022 0.0097  0.0225
 00     0.0157  0.019 0.0199  0.0207  0.0185  0.0153  0.011 0.0071  0.0033  0 -0.003  -0.0067 -0.0107 -0.0147 -0.0182 -0.0204 -0.0196 -0.0187 -0.0154
 20     0.0895  0.0815  0.0692  0.0579  0.0453  0.0354  0.027 0.0171  0.0076  0 -0.0085 -0.0177 -0.0271 -0.0365 -0.044  -0.0569 -0.0682 -0.0804 -0.0884
 40     0.0721  0.0573  0.0302  0.0087  0.005 0.0104  0.0174  0.0124  0.0062  0 -0.0075 -0.0108 -0.0131 -0.0145 -0.0148 -0.0185 -0.0399 -0.0671 -0.0815
 60     0.065 0.0481  0.0387  0.0301  0.0229  0.0192  0.0155  0.0094  0.0063  0 -0.0029 -0.0055 -0.0111 -0.0163 -0.0188 -0.026  -0.0346 -0.044  -0.0609
 90     0.0701  0.0534  0.041 0.0293  0.0205  0.0188  0.0163  0.011 0.0066  0 0 -0.0001 -0.0067 -0.0124 -0.0154 -0.0242 -0.0359 -0.0483 -0.065
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                     </tableData>
                </table>
    </function>

    <function name="aero/coefficient/Cl_lef">
        <description>
            coefficient
        </description>
                <table>
                    <independentVar lookup="row">aero/alpha-deg</independentVar>
                    <independentVar lookup="column">aero/beta-deg</independentVar>
                    <tableData note="Numbers in this table typed in by E.V.Oort and L.Sonneveldt">
       -30    -25    -20    -15    -10     -8     -6     -4     -2      0      2      4      6      8     10     15     20     25     30
-20 -0.0205 -0.017  -0.0076 0.0047  0.015 0.0134  0.0008  0.0013  0.0027  0 -0.0012 -0.0031 -0.0054 -0.0051 -0.0054 0.0036  0.0159  0.0256  0.0297
-05     0.0106  0.0102  0.0104  0.0103  0.0093  0.0073  0.0052  0.003 0.0012  0 -0.001  -0.0027 -0.0044 -0.0065 -0.0087 -0.01 -0.0103 -0.0102 -0.0106
 10     0.0485  0.0463  0.043 0.0347  0.0263  0.0213  0.0155  0.01  0.0046  0 -0.0048 -0.0115 -0.0175 -0.0227 -0.0278 -0.036  -0.0443 -0.0476 -0.0498
 25     0.0731  0.0573  0.0371  0.0221  0.0233  0.0203  0.0175  0.012 0.0061  0 -0.0058 -0.0128 -0.0183 -0.0186 -0.026  -0.0248 -0.0398 -0.061  -0.0758
 40     0.0555  0.0435  0.0339  0.0173  0.0094  0.0156  0.0193  0.011 0.011 0 -0.0074 -0.0126 -0.0194 -0.0213 -0.0253 -0.0332 -0.0498 -0.0594 -0.0714
 45     0.05  0.0493  0.0351  0.0306  0.0179  0.0158  0.0128  0.0077  0.0019  0 -0.0118 -0.0124 -0.015  -0.0173 -0.0214 -0.0341 -0.0386 -0.0528 -0.0535
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                     </tableData>
                </table>
    </function>

    <function name="aero/coefficient/Cl_a">
        <description>
            coefficient
        </description>
                <table>
                    <independentVar lookup="row">aero/alpha-deg</independentVar>
                    <independentVar lookup="column">aero/beta-deg</independentVar>
                    <tableData note="Numbers in this table typed in by E.V.Oort and L.Sonneveldt">
       -30    -25    -20    -15    -10     -8     -6     -4     -2      0      2      4      6      8     10     15     20     25     30
-20 -0.0499   -0.0325   -0.0184   -0.0113   -0.0023   -0.0059   -0.0125   -0.0116   -0.0170   -0.0211   -0.0242   -0.0271   -0.0331   -0.0352   -0.0392  -0.0302   -0.0231   -0.0090    0.0084
 00    -0.0404   -0.0372   -0.0327   -0.0302   -0.0323   -0.0342   -0.0373   -0.0414   -0.0451   -0.0482   -0.0510   -0.0536   -0.0570   -0.0595   -0.0624  -0.0645   -0.0620   -0.0575   -0.0543
 20     0.0074    0.0045    0.0038    0.0063    0.0026   -0.0053   -0.0137   -0.0228   -0.0322   -0.0416   -0.0515   -0.0606   -0.0689   -0.0784   -0.0863  -0.0900   -0.0875   -0.0882   -0.0911
 40     0.0419    0.0253    0.0041   -0.0183   -0.0154   -0.0061   -0.0014   -0.0057   -0.0117   -0.0195   -0.0276   -0.0310   -0.0347   -0.0346   -0.0339  -0.0310   -0.0534   -0.0746   -0.0912
 60     0.0490    0.0323    0.0267    0.0182    0.0089    0.0046   -0.0005   -0.0043   -0.0070   -0.0119   -0.0155   -0.0193   -0.0235   -0.0277   -0.0296  -0.0389   -0.0474   -0.0530   -0.0697
 90     0.0706    0.0522    0.0400    0.0317    0.0182    0.0143    0.0105    0.0076    0.0037    0.0012   -0.0035   -0.0062   -0.0100   -0.0133   -0.0170  -0.0305   -0.0388   -0.0510   -0.0694
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                    </tableData>
                </table>
    </function>

    <function name="aero/coefficient/Cl_a-lef">
        <description>
            coefficient
        </description>
                <table>
                    <independentVar lookup="row">aero/alpha-deg</independentVar>
                    <independentVar lookup="column">aero/beta-deg</independentVar>
                    <tableData note="Numbers in this table typed in by E.V.Oort and L.Sonneveldt">
       -30    -25    -20    -15    -10     -8     -6     -4     -2      0      2      4      6      8     10     15     20     25     30
-20 -0.0522   -0.0388   -0.0295   -0.0190   -0.0133   -0.0214   -0.0230   -0.0214   -0.0213   -0.0219   -0.0217   -0.0242   -0.0274   -0.0289   -0.0304  -0.0245   -0.0137   -0.0038    0.0101
-05    -0.0419   -0.0447   -0.0428   -0.0407   -0.0446   -0.0458   -0.0469   -0.0493   -0.0508   -0.0524   -0.0533   -0.0537   -0.0550   -0.0566   -0.0578  -0.0614   -0.0591   -0.0579   -0.0603
 10     0.0048    0.0017   -0.0026   -0.0198   -0.0179   -0.0221   -0.0277   -0.0329   -0.0389   -0.0432   -0.0479   -0.0529   -0.0576   -0.0625   -0.0674  -0.0759   -0.0830   -0.0872   -0.0901
 25     0.0308    0.0244    0.0078   -0.0102   -0.0021   -0.0006   -0.0086   -0.0144   -0.0196   -0.0261   -0.0306   -0.0369   -0.0417   -0.0441   -0.0464  -0.0386   -0.0485   -0.0657   -0.0820
 40     0.0436    0.0345    0.0217    0.0087    0.0033    0.0121    0.0088    0.0090    0.0071   -0.0080   -0.0097   -0.0210   -0.0288   -0.0347   -0.0351  -0.0405   -0.0534   -0.0665   -0.0754
 45     0.0499    0.0450    0.0350    0.0263    0.0128    0.0097    0.0089    0.0058    0.0002   -0.0059   -0.0096   -0.0168   -0.0172   -0.0232   -0.0233  -0.0378   -0.0460   -0.0560   -0.0599
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                     </tableData>
                </table>
    </function>

    <function name="aero/coefficient/Cl_rudder">
        <description>
            coefficient
        </description>
                <table>
                    <independentVar lookup="row">aero/alpha-deg</independentVar>
                    <independentVar lookup="column">aero/beta-deg</independentVar>
                    <tableData note="Numbers in this table typed in by E.V.Oort and L.Sonneveldt">
       -30    -25    -20    -15    -10     -8     -6     -4     -2      0      2      4      6      8     10     15     20     25     30
-20 -0.0100    0.0057    0.0178    0.0291    0.0365    0.0364    0.0336    0.0316    0.0251    0.0216    0.0159    0.0154    0.0142    0.0100    0.0005   0.0079    0.0191    0.0311    0.0465
 00     0.0291    0.0328    0.0338    0.0329    0.0293    0.0298    0.0261    0.0220    0.0181    0.0145    0.0111    0.0078    0.0035   -0.0010   -0.0054  -0.0087   -0.0093   -0.0080   -0.0044
 20     0.1090    0.0930    0.0810    0.0710    0.0532    0.0476    0.0414    0.0315    0.0227    0.0139    0.0058   -0.0030   -0.0120   -0.0231   -0.0324  -0.0501   -0.0598   -0.0719   -0.0799
 40     0.0584    0.0577    0.0360    0.0088    0.0047    0.0092    0.0143    0.0140    0.0129    0.0030   -0.0006   -0.0053   -0.0073   -0.0088   -0.0110  -0.0143   -0.0426   -0.0641   -0.0648
 60     0.0600    0.0448    0.0350    0.0270    0.0182    0.0157    0.0130    0.0077    0.0048   -0.0012   -0.0055   -0.0078   -0.0140   -0.0172   -0.0202  -0.0290   -0.0375   -0.0470   -0.0624
 90     0.0660    0.0532    0.0390    0.0269    0.0174    0.0156    0.0102    0.0089    0.0069    0.0008   -0.0030   -0.0051   -0.0074   -0.0132   -0.0156  -0.0247   -0.0368   -0.0513   -0.0638
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                    </tableData>
                </table>
    </function>
<!--
    <function name="aero/coefficient/">
        <description>
            coefficient
        </description>

    </function>
  -->

    <axis name="ROLL">

        <function name="aero/coefficient/Cl">
            <description>
               Cl coefficient
            </description>
            <product>
                <property>aero/qbar-psf</property>
                <property>metrics/Sw-sqft</property>
                <property>metrics/bw-ft</property>
                <table>
                    <independentVar lookup="row">aero/alpha-deg</independentVar>
                    <independentVar lookup="column">aero/beta-deg</independentVar>
                    <independentVar lookup="table">fcs/elevator-pos-deg</independentVar>
                    <tableData breakPoint="-25.0" note="Numbers in this table typed in by E.V.Oort and L.Sonneveldt">
       -30    -25    -20    -15    -10     -8     -6     -4     -2      0      2      4      6      8     10     15     20     25     30
-20 -0.006 0.0065  0.0133  0.0217  0.0268  0.0238  0.0219  0.0179  0.0121  0 -0.0096 -0.0167 -0.021  -0.0239 -0.0245 -0.0196 -0.0107 -0.0039 -0.0118
 00     0.0276  0.0285  0.0262  0.0225  0.0189  0.0151  0.0112  0.0075  0.0035  0 -0.0035 -0.0075 -0.0114 -0.0151 -0.0187 -0.0223 -0.026  -0.0283 -0.0274
 20     0.0761  0.0708  0.0654  0.0551  0.0454  0.0377  0.0284  0.0185  0.0093  0 -0.0101 -0.018  -0.0293 -0.0369 -0.0448 -0.0542 -0.0642 -0.0694 -0.0743
 40     0.0665  0.0605  0.0353  0.0132  0.0077  0.0092  0.0156  0.0096  0.0048  0 -0.0077 -0.0117 -0.0123 -0.015  -0.013  -0.018  -0.0403 -0.0656 -0.0716
 60     0.061 0.0413  0.0336  0.023 0.0137  0.0122  0.0106  0.0064  0.0048  0 -0.0026 -0.0049 -0.0095 -0.0132 -0.0141 -0.0234 -0.034  -0.0417 -0.0614
 90     0.0601  0.046 0.0363  0.0253  0.0213  0.0183  0.0147  0.0091  0.0056  0 -0.0006 -0.0012 -0.0086 -0.0152 -0.0191 -0.0231 -0.0341 -0.0438 -0.0579
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                    </tableData>
                    <tableData breakPoint="0.0" note="Numbers in this table typed in by E.V.Oort and L.Sonneveldt">
       -30    -25    -20    -15    -10     -8     -6     -4     -2      0      2      4      6      8     10     15     20     25     30
-20 -0.0153  -0.0028 0.0091  0.0188  0.0234  0.0173  0.0106  0.009 0.0041  0 -0.0031 -0.0064 -0.0084 -0.0128 -0.0171 -0.012  -0.0022 0.0097  0.0225
 00     0.0157  0.019 0.0199  0.0207  0.0185  0.0153  0.011 0.0071  0.0033  0 -0.003  -0.0067 -0.0107 -0.0147 -0.0182 -0.0204 -0.0196 -0.0187 -0.0154
 20     0.0895  0.0815  0.0692  0.0579  0.0453  0.0354  0.027 0.0171  0.0076  0 -0.0085 -0.0177 -0.0271 -0.0365 -0.044  -0.0569 -0.0682 -0.0804 -0.0884
 40     0.0721  0.0573  0.0302  0.0087  0.005 0.0104  0.0174  0.0124  0.0062  0 -0.0075 -0.0108 -0.0131 -0.0145 -0.0148 -0.0185 -0.0399 -0.0671 -0.0815
 60     0.065 0.0481  0.0387  0.0301  0.0229  0.0192  0.0155  0.0094  0.0063  0 -0.0029 -0.0055 -0.0111 -0.0163 -0.0188 -0.026  -0.0346 -0.044  -0.0609
 90     0.0701  0.0534  0.041 0.0293  0.0205  0.0188  0.0163  0.011 0.0066  0 0 -0.0001 -0.0067 -0.0124 -0.0154 -0.0242 -0.0359 -0.0483 -0.065
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                    </tableData>
                    <tableData breakPoint="25.0" note="Numbers in this table typed in by E.V.Oort and L.Sonneveldt">
       -30    -25    -20    -15    -10     -8     -6     -4     -2      0      2      4      6      8     10     15     20     25     30
-20 -0.01380  -0.00900  0.01060 0.02270 0.02480 0.01450 0.01120 0.00500 0.00310 0.00000 -0.00330  -0.00810  -0.00770  -0.01600  -0.01860  -0.01670  -0.00440  -0.00740  -0.02560
 00     0.02670 0.02610 0.02450 0.02150 0.01880 0.01470 0.01050 0.00580 0.00260 0.00000 -0.00290  -0.00650  -0.01080  -0.01520  -0.01880  -0.02150  -0.02470  -0.02630  -0.02690
 20     0.08300 0.07940 0.06940 0.05580 0.04270 0.03320 0.02430 0.01720 0.00790 0.00000 -0.01020  -0.02020  -0.02150  -0.02940  -0.03940  -0.05200  -0.06530  -0.07530  -0.07840
 40     0.06730 0.05830 0.02970 0.00500 -0.00020  0.00310 0.01060 0.00530 0.00550 0.00000 -0.00540  -0.00770  -0.00990  -0.00580  -0.00680  -0.01200  -0.03670  -0.06540  -0.07410
 60     0.06110 0.04280 0.03210 0.02630 0.02190 0.01650 0.01610 0.01020 0.00710 0.00000 -0.00420  -0.00810  -0.01420  -0.01900  -0.02110  -0.02550  -0.03130  -0.04200  -0.06030
 90     0.06070 0.04860 0.04070 0.03050 0.02110 0.01800 0.01650 0.01160 0.00700 0.00000 -0.00080  -0.00170  -0.01980  -0.01300  -0.01500  -0.02440  -0.03460  -0.04250  -0.05460
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                     </tableData>
                </table>
            </product>
        </function>

        <function name="aero/coefficient/dCl_lef">
            <description>
               Cl due to leading edge flaps coefficient.
            </description>
            <product>
                <property>aero/qbar-psf</property>
                <property>metrics/Sw-sqft</property>
                <property>metrics/bw-ft</property>
                <property>fcs/lef-pos-r-norm</property>
                <difference>
                    <p>aero/coefficient/Cl_lef</p>
                    <p>aero/coefficient/Cl_dh0</p>
                </difference>
            </product>
        </function>

        <function name="aero/coefficient/dCl_a-lef">
            <description>
               Cl due to aileron coefficient
            </description>
            <product>
                <property>aero/qbar-psf</property>
                <property>metrics/Sw-sqft</property>
                <property>metrics/bw-ft</property>
                <p>fcs/aileron-pos-norm</p><!-- 1 = 20 degs -->
                <sum>
                    <difference>
                        <p>aero/coefficient/Cl_a</p>
                        <p>aero/coefficient/Cl_dh0</p>
                    </difference>
                    <product>
                        <p>fcs/lef-pos-r-norm</p>
                        <difference>
                            <p>aero/coefficient/Cl_a-lef</p>
                            <p>aero/coefficient/Cl_lef</p>
                            <difference>
                                <p>aero/coefficient/Cl_a</p>
                                <p>aero/coefficient/Cl_dh0</p>
                            </difference>
                        </difference>
                    </product>
                </sum>
            </product>
        </function>

        <function name="aero/coefficient/dCl_dr">
            <description>
               Cl due to rudder coefficient
            </description>
            <product>
                <property>aero/qbar-psf</property>
                <property>metrics/Sw-sqft</property>
                <property>metrics/bw-ft</property>
                <p>fcs/rudder-pos-norm</p><!-- 1 = 30 degs -->
                <difference>
                    <p>aero/coefficient/Cl_rudder</p>
                    <p>aero/coefficient/Cl_dh0</p>
                </difference>
            </product>
        </function>

        <function name="aero/coefficient/Cl_r">
            <description>
               Cl due to yaw rate coefficient.
            </description>
            <product>
                <property>aero/qbar-psf</property>
                <property>metrics/Sw-sqft</property>
                <property>metrics/bw-ft</property>
                <property>aero/bi2vel</property>
                <property>velocities/r-rad_sec</property>
                <table>
                    <independentVar lookup="row">aero/alpha-deg</independentVar>
                    <tableData>
-20 -.155
-15 -.155
 00 -.002
 15 .22
 30 .68
 45 -.33
 60 .0802
 90 -.0183
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                     </tableData>
                </table>
            </product>
        </function>

        <function name="aero/coefficient/Cl_b">
            <description>
               Cl due to beta coefficient.
            </description>
            <product>
                <property>aero/qbar-psf</property>
                <property>metrics/Sw-sqft</property>
                <property>metrics/bw-ft</property>
                <property>aero/beta-rad</property>
                <table>
                    <independentVar lookup="row">aero/alpha-deg</independentVar>
                    <tableData>
-20 .0
-15 .0
 00 .0
 15 .0007
 30 .0
 45 .0
 60 .0
 90 .0
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                    </tableData>
                </table>
            </product>
        </function>

        <function name="aero/coefficient/Cl_r-lef">
            <description>
               Cl due to yaw rate due to leading edge flaps coefficient.
            </description>
            <product>
                <property>aero/qbar-psf</property>
                <property>metrics/Sw-sqft</property>
                <property>metrics/bw-ft</property>
                <property>aero/bi2vel</property>
                <property>velocities/r-rad_sec</property>
                <property>fcs/lef-pos-r-norm</property>
                <table>
                    <independentVar lookup="row">aero/alpha-deg</independentVar>
                    <tableData>
-20 .029
-15 .029
-05 .175
 05 .36
 15 .066
 25 .006
 35 -.537
 45 -.394
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                     </tableData>
                </table>
            </product>
        </function>

        <function name="aero/coefficient/Cl_p">
            <description>
               Cl due to roll rate coefficient.
            </description>
            <product>
                <property>aero/qbar-psf</property>
                <property>metrics/Sw-sqft</property>
                <property>metrics/bw-ft</property>
                <property>aero/bi2vel</property>
                <property>velocities/p-rad_sec</property>
                <table>
                    <independentVar lookup="row">aero/alpha-deg</independentVar>
                    <tableData>
-20 -.366
-15 -.366
 00 -.345
 15 -.388
 30 -.23
 45 -.10
 60 -.14
 90 -.2
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                     </tableData>
                </table>
            </product>
        </function>

        <function name="aero/coefficient/Cl_p-lef">
            <description>
               Cl due to roll rate due to leading edge flaps coefficient.
            </description>
            <product>
                <property>aero/qbar-psf</property>
                <property>metrics/Sw-sqft</property>
                <property>metrics/bw-ft</property>
                <property>aero/bi2vel</property>
                <property>velocities/p-rad_sec</property>
                <property>fcs/lef-pos-r-norm</property>
                <table>
                    <independentVar lookup="row">aero/alpha-deg</independentVar>
                    <tableData>
-20 .006
-15 .006
-05 .018
 05 .02
 15 .087
 25 -.056
 35 .362
 45 .097
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                     </tableData>
                </table>
            </product>
        </function>

    </axis>

</aerodynamics>
